# OpenSim document version 40000
Model 3D_gait-scaled-scaled-scaled:
  gravity: 0 -9.81 0
  length_units: meters
  force_units: N
  Ground
  BodySet:
    Body pelvis: mass=13.6502 [kg] mass_center=(-0.0702639 0 0) inertia=(0.1174381 0.1174381 0.06669537 0 0 0)
        meshes=(r_pelvis.vtp l_pelvis.vtp sacrum.vtp)
    Body femur_l: mass=10.78084 mass_center=(0 -0.1687587 0) inertia=(0.1560663 0.04634475 0.1560663 0 0 0)
        meshes=l_femur.vtp
    Body tibia_l: mass=4.297199 mass_center=(0 -0.2313192 0) inertia=(0.08774779 0.00522052 0.08774779 0 0 0)
        meshes=(l_tibia.vtp l_fibula.vtp)
    Body patella_l: mass=0.09991059 mass_center=(0.0018 0.0264 0) inertia=(3.32649e-6 1.519522e-5 1.519522e-5 0 0 0)
        meshes=l_patella.vtp
    Body talus_l: mass=0.1159056 mass_center=(0 0 0) inertia=(0.001391033 0.001347705 0.001347705 0 0 0)
        meshes=l_talus.vtp
    Body calcn_l: mass=1.448819 mass_center=(0.1060839 0.03 0) inertia=(0.001947446 0.005147731 0.005147731 0 0 0)
        meshes=l_foot.vtp
    Body toes_l: mass=0.2510514 mass_center=(0.03670503 0.006 0.02100251)
        inertia=(0.0001391033 0.0002652083 0.0002652083 0 0 0) meshes=l_bofoot.vtp
    Body femur_r: mass=10.78084 mass_center=(0 -0.1761981 0) inertia=(0.1652104 0.04068285 0.1652104 0 0 0)
        meshes=r_femur.vtp
    Body chassis: mass=0.2039938 mass_center=(-0.00562 0.019 0) inertia=(3.107327e-5 2.987155e-5 2.577026e-5 0 0 0)
        meshes=RBD_FEA_B-0000747_scaled.STL
    Body front_link: mass=0.2689009 mass_center=(0.02218 -0.08 0)
        inertia=(0.0008872641 0.0001493633 0.0009011762 0 0 0) meshes=RBD_FEA_B-0000275_scaled.STL
    Body cylinder: mass=1.087194 mass_center=(0 0.02 0) inertia=(0.0008494633 0.0001158452 0 0 0 0)
        meshes=RBD_FEA_B-0000674_scaled.STL
    Body shintube_foot: mass=0.9330268 mass_center=(0 -0.02177978 0)
        inertia=(0.001624167 0.000756512 0.001624167 0 0 0) meshes=Esprit_foot.stl
    Body torso: mass=31.09352 mass_center=(-0.03 0.311557 0) inertia=(1.642833 0.8756665 1.642833 0 0 0)
        meshes=(hat_spine.vtp hat_jaw.vtp hat_skull.vtp hat_ribs_scap.vtp)
    Body humerus_r: mass=2.35578 mass_center=(0 -0.1754149 0) inertia=(0.01541671 0.004776468 0.01541671 0 0 0)
        meshes=humerus_rv.vtp
    Body ulna_r: mass=0.7041263 mass_center=(0 -0.1246689 0) inertia=(0.003648205 0.0007162963 0.003648205 0 0 0)
        meshes=ulna_rv.vtp
    Body radius_r: mass=0.7041263 mass_center=(0 -0.1156672 0) inertia=(0.003190242 0.0007162963 0.003190242 0 0 0)
        meshes=radius_rv.vtp
    Body hand_r: mass=0.5302679 mass_center=(0 -0.068095 0) inertia=(0.001033878 0.0006340034 0.001553134 0 0 0)
        meshes=(pisiform_rvs.vtp lunate_rvs.vtp scaphoid_rvs.vtp triquetrum_rvs.vtp hamate_rvs.vtp capitate_rvs.vtp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)
    Body humerus_l: mass=2.35578 mass_center=(0 -0.1730201 0) inertia=(0.0150634 0.004776468 0.0150634 0 0 0)
        meshes=humerus_lv.vtp
    Body ulna_l: mass=0.7041263 mass_center=(0 -0.1211492 0) inertia=(0.003465058 0.0007162963 0.003465058 0 0 0)
        meshes=ulna_lv.vtp
    Body radius_l: mass=0.7041263 mass_center=(0 -0.1156672 0) inertia=(0.003190242 0.0007162963 0.003190242 0 0 0)
        meshes=radius_lv.vtp
    Body hand_l: mass=0.5302679 mass_center=(0 -0.068095 0) inertia=(0.001033878 0.0006340034 0.001553134 0 0 0)
        meshes=(pisiform_lvs.vtp lunate_lvs.vtp scaphoid_lvs.vtp triquetrum_lvs.vtp hamate_lvs.vtp capitate_lvs.vtp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)
  JointSet:
    CustomJoint groundPelvis: socket_parent_frame=ground_offset socket_child_frame=pelvis_offset
      Coordinate pelvis_tilt: range=(-1.570796 1.570796)
      Coordinate pelvis_list: range=(-1.570796 1.570796)
      Coordinate pelvis_rotation: range=(-1.570796 1.570796)
      Coordinate pelvis_tx: range=(-5 5)
      Coordinate pelvis_ty: default_value=0.94 range=(-3 3)
      Coordinate pelvis_tz: default_value=0 range=(-3 3)
      PhysicalOffsetFrame ground_offset: socket_parent=/ground translation=(0 0 0) [meters]
      PhysicalOffsetFrame pelvis_offset: socket_parent=/bodyset/pelvis translation=(0 0 0)
      SpatialTransform:
        TransformAxis rotation1: coordinates=pelvis_tilt axis=(0 0 1) LinearFunction(coefficients=1 0)
        TransformAxis rotation2: coordinates=pelvis_list axis=(1 0 0) LinearFunction(coefficients=1 0)
        TransformAxis rotation3: coordinates=pelvis_rotation axis=(0 1 0) LinearFunction(coefficients=1 0)
        TransformAxis translation1: coordinates=pelvis_tx axis=(1 0 0) LinearFunction(coefficients=1 0)
        TransformAxis translation2: coordinates=pelvis_ty axis=(0 1 0) LinearFunction(coefficients=1 0)
        TransformAxis translation3: coordinates=pelvis_tz axis=(0 0 1) LinearFunction(coefficients=1 0)
    CustomJoint hip_l: socket_parent_frame=pelvis_offset socket_child_frame=femur_l_offset
      Coordinate hip_flexion_l: default_value=0 range=(-0.5235988 2.094395)
      Coordinate hip_adduction_l: range=(-0.8726646 0.5235988)
      Coordinate hip_rotation_l: range=(-0.6981317 0.6981317)
      PhysicalOffsetFrame pelvis_offset: socket_parent=/bodyset/pelvis translation=(-0.05592887 -0.07849 -0.0765774)
      PhysicalOffsetFrame femur_l_offset: socket_parent=/bodyset/femur_l translation=(0 0 0)
      SpatialTransform: axes_held_at_zero=(translation1 translation2 translation3)
        TransformAxis rotation1: coordinates=hip_flexion_l axis=(0 0 1) LinearFunction(coefficients=1 0)
        TransformAxis rotation2: coordinates=hip_adduction_l axis=(1 0 0) LinearFunction(coefficients=-1 0)
        TransformAxis rotation3: coordinates=hip_rotation_l axis=(0 1 0) LinearFunction(coefficients=-1 0)
    CustomJoint patellofemoral_l: socket_parent_frame=tibia_l_offset socket_child_frame=patella_l_offset
      Coordinate knee_angle_l_beta
      PhysicalOffsetFrame tibia_l_offset: socket_parent=/bodyset/femur_l translation=(-0.00809 -0.4049812 0.003132722)
      PhysicalOffsetFrame patella_l_offset: socket_parent=/bodyset/patella_l translation=(0 0 0)
      SpatialTransform: axes_held_at_zero=(rotation2 rotation3)
        TransformAxis rotation1: coordinates=knee_angle_l_beta axis=(0 0 1)
          SimmSpline: x=(0 0.174533 0.349066 0.523599 0.698132 0.872665 1.0472 1.22173 1.39626 1.5708 1.74533 1.91986 2.0944)
              y=(0.00113686 -0.00629212 -0.105582 -0.253683 -0.414245 -0.579047 -0.747244 -0.91799 -1.09044 -1.26379 -1.43763 -1.61186 -1.78634)
        TransformAxis translation1: coordinates=knee_angle_l_beta axis=(1 0 0)
          MultiplierFunction: scale=1
            SimmSpline: x=(0 0.174533 0.349066 0.523599 0.698132 0.872665 1.0472 1.22173 1.39626 1.5708 1.74533 1.91986 2.0944)
                y=(0.0524 0.0488 0.0437 0.0371 0.0296 0.0216 0.0136 0.0057 -0.0019 -0.0088 -0.0148 -0.0196 -0.0227)
        TransformAxis translation2: coordinates=knee_angle_l_beta axis=(0 1 0)
          MultiplierFunction: scale=0.9926982
            SimmSpline: x=(0 0.174533 0.349066 0.523599 0.698132 0.872665 1.0472 1.22173 1.39626 1.5708 1.74533 1.91986 2.0944)
                y=(-0.0108 -0.019 -0.0263 -0.0322 -0.0367 -0.0395 -0.0408 -0.0404 -0.0384 -0.0349 -0.0301 -0.0245 -0.0187)
        TransformAxis translation3: axis=(0 0 1) MultiplierFunction(scale=1.139172, Constant(value=-0.00275))
    CustomJoint knee_l: socket_parent_frame=femur_l_offset socket_child_frame=tibia_l_offset
      Coordinate knee_angle_l: default_value=0 range=(-2.094395 0)
      Coordinate knee_adduction_l: range=(-0.5235988 0.5235988)
      Coordinate knee_rotation_l: range=(-0.5235988 0.5235988)
      PhysicalOffsetFrame femur_l_offset: socket_parent=/bodyset/femur_l translation=(0 -0.4049812 0.003132722)
      PhysicalOffsetFrame tibia_l_offset: socket_parent=/bodyset/tibia_l translation=(0 0 0)
      SpatialTransform: axes_held_at_zero=(translation1 translation2 translation3)
        TransformAxis rotation1: coordinates=knee_angle_l axis=(0 0 1) LinearFunction(coefficients=1 0)
        TransformAxis rotation2: coordinates=knee_adduction_l axis=(1 0 0) LinearFunction(coefficients=-1 0)
        TransformAxis rotation3: coordinates=knee_rotation_l axis=(0 1 0) LinearFunction(coefficients=-1 0)
    PinJoint ankle_l: socket_parent_frame=tibia_l_offset socket_child_frame=talus_l_offset
      Coordinate ankle_angle_l: range=(-0.6981317 0.5235988)
      PhysicalOffsetFrame tibia_l_offset: socket_parent=/bodyset/tibia_l translation=(-0.01 -0.4955956 0)
          orientation=(-0.1758952 0.105208 0.01866219) [radians]
      PhysicalOffsetFrame talus_l_offset: socket_parent=/bodyset/talus_l translation=(0 0 0)
          orientation=(-0.1758952 0.105208 0.01866219)
    PinJoint subtalar_l: socket_parent_frame=talus_l_offset socket_child_frame=calcn_l_offset
      Coordinate subtalar_angle_l: range=(-0.3490659 0.3490659)
      PhysicalOffsetFrame talus_l_offset: socket_parent=/bodyset/talus_l
          translation=(-0.05173712 -0.04195 -0.009505136) orientation=(1.768191 -0.906223 1.819602)
      PhysicalOffsetFrame calcn_l_offset: socket_parent=/bodyset/calcn_l translation=(0 0 0)
          orientation=(1.768191 -0.906223 1.819602)
    PinJoint mtp_l: socket_parent_frame=calcn_l_offset socket_child_frame=toes_l_offset
      Coordinate mtp_angle_l: range=(-1.0472 1.0472)
      PhysicalOffsetFrame calcn_l_offset: socket_parent=/bodyset/calcn_l translation=(0.189678 -0.002 -0.001296155)
          orientation=(0 0.6199005 0)
      PhysicalOffsetFrame toes_l_offset: socket_parent=/bodyset/toes_l translation=(0 0 0) orientation=(0 0.6199005 0)
    CustomJoint hip_r: socket_parent_frame=pelvis_offset socket_child_frame=femur_r_offset
      Coordinate hip_flexion_r: default_value=0 range=(-0.5235988 2.094395)
      Coordinate hip_adduction_r: range=(-0.8726646 0.5235988)
      Coordinate hip_rotation_r: range=(-0.6981317 0.6981317)
      PhysicalOffsetFrame pelvis_offset: socket_parent=/bodyset/pelvis translation=(-0.05592887 -0.07849 0.0765774)
      PhysicalOffsetFrame femur_r_offset: socket_parent=/bodyset/femur_r translation=(0 0 0)
      SpatialTransform: axes_held_at_zero=(translation1 translation2 translation3)
        TransformAxis rotation1: coordinates=hip_flexion_r axis=(0 0 1) LinearFunction(coefficients=1 0)
        TransformAxis rotation2: coordinates=hip_adduction_r axis=(1 0 0) LinearFunction(coefficients=1 0)
        TransformAxis rotation3: coordinates=hip_rotation_r axis=(0 1 0) LinearFunction(coefficients=1 0)
    WeldJoint femur_r_chassis: socket_parent_frame=femur_r_offset socket_child_frame=chassis_offset
      PhysicalOffsetFrame femur_r_offset: socket_parent=/bodyset/femur_r translation=(0.005 -0.4454024 0)
      PhysicalOffsetFrame chassis_offset: socket_parent=/bodyset/chassis translation=(0 0 0) orientation=(0 3.141 0)
    PinJoint chassis_front_link: socket_parent_frame=chassis_offset socket_child_frame=front_link_offset
      Coordinate front_link_theta: default_value=0 range=(0 2.082242) clamped=true
      PhysicalOffsetFrame chassis_offset: socket_parent=/bodyset/chassis translation=(0 0 0)
      PhysicalOffsetFrame front_link_offset: socket_parent=/bodyset/front_link translation=(0 0 0)
    WeldJoint front_link_cylinder: socket_parent_frame=front_link_offset socket_child_frame=cylinder_offset
      PhysicalOffsetFrame front_link_offset: socket_parent=/bodyset/front_link translation=(0 -0.1725 0)
          orientation=(0 3.14 0)
      PhysicalOffsetFrame cylinder_offset: socket_parent=/bodyset/cylinder translation=(0 0 0) orientation=(0 3.14 0)
    WeldJoint cylinder_shintube_foot: socket_parent_frame=cylinder_offset socket_child_frame=shintube_foot_offset
      PhysicalOffsetFrame cylinder_offset: socket_parent=/bodyset/cylinder translation=(0.02202 -0.05343 0)
          orientation=(0 3.14 -0.05235988)
      PhysicalOffsetFrame shintube_foot_offset: socket_parent=/bodyset/shintube_foot translation=(0 0 0)
          orientation=(0 -1.57 0)
    CustomJoint lumbar: socket_parent_frame=pelvis_offset socket_child_frame=torso_offset
      Coordinate lumbar_ext: range=(-1.570796 1.570796)
      Coordinate lumbar_bend: range=(-1.570796 1.570796)
      Coordinate lumbar_rota: range=(-1.570796 1.570796)
      PhysicalOffsetFrame pelvis_offset: socket_parent=/bodyset/pelvis translation=(-0.1000789 0.0815 0)
      PhysicalOffsetFrame torso_offset: socket_parent=/bodyset/torso translation=(0 0 0)
      SpatialTransform: axes_held_at_zero=(translation1 translation2 translation3)
        TransformAxis rotation1: coordinates=lumbar_ext axis=(0 0 1) LinearFunction(coefficients=1 0)
        TransformAxis rotation2: coordinates=lumbar_bend axis=(1 0 0) LinearFunction(coefficients=1 0)
        TransformAxis rotation3: coordinates=lumbar_rota axis=(0 1 0) LinearFunction(coefficients=1 0)
    CustomJoint shoulder_r: socket_parent_frame=torso_offset socket_child_frame=humerus_r_offset
      Coordinate shoulder_flexion_r: range=(-1.0472 3.1416)
      Coordinate shoulder_adduction_r: range=(-0.5236 0.1745)
      Coordinate shoulder_rotation_r: range=(-0.5236 0.5236)
      PhysicalOffsetFrame torso_offset: socket_parent=/bodyset/torso translation=(0.003155 0.3616982 0.17)
      PhysicalOffsetFrame humerus_r_offset: socket_parent=/bodyset/humerus_r translation=(0 0 0)
      SpatialTransform: axes_held_at_zero=(translation1 translation2 translation3)
        TransformAxis rotation1: coordinates=shoulder_flexion_r axis=(0 0 1) LinearFunction(coefficients=1 0)
        TransformAxis rotation2: coordinates=shoulder_adduction_r axis=(1 0 0) LinearFunction(coefficients=1 0)
        TransformAxis rotation3: coordinates=shoulder_rotation_r axis=(0 1 0) LinearFunction(coefficients=1 0)
    PinJoint elbow_r: socket_parent_frame=humerus_r_offset socket_child_frame=ulna_r_offset
      Coordinate elbow_flexion_r: range=(0 2.618)
      PhysicalOffsetFrame humerus_r_offset: socket_parent=/bodyset/humerus_r
          translation=(0.013144 -0.3052641 -0.009595) orientation=(-0.02286271 0.2280177 0.005168901)
      PhysicalOffsetFrame ulna_r_offset: socket_parent=/bodyset/ulna_r translation=(0 0 0)
          orientation=(-0.02286271 0.2280177 0.005168901)
    WeldJoint radioulnar_r: socket_parent_frame=ulna_r_offset socket_child_frame=radius_r_offset
      PhysicalOffsetFrame ulna_r_offset: socket_parent=/bodyset/ulna_r translation=(-0.006727 -0.01345421 0.026083)
          orientation=(-1.568841 0.05642797 1.536144)
      PhysicalOffsetFrame radius_r_offset: socket_parent=/bodyset/radius_r translation=(0 0 0)
          orientation=(-1.568841 0.05642797 -0.0346525)
    WeldJoint wrist_r: socket_parent_frame=radius_r_offset socket_child_frame=hand_r_offset
      PhysicalOffsetFrame radius_r_offset: socket_parent=/bodyset/radius_r translation=(-0.008797 -0.2263353 0.01361)
      PhysicalOffsetFrame hand_r_offset: socket_parent=/bodyset/hand_r translation=(0 0 0)
    CustomJoint shoulder_l: socket_parent_frame=torso_offset socket_child_frame=humerus_l_offset
      Coordinate shoulder_flexion_l: range=(-1.0472 3.1416)
      Coordinate shoulder_adduction_l: range=(-0.5236 0.1745)
      Coordinate shoulder_rotation_l: range=(-0.5236 0.5236)
      PhysicalOffsetFrame torso_offset: socket_parent=/bodyset/torso translation=(0.003155 0.3616982 -0.17)
      PhysicalOffsetFrame humerus_l_offset: socket_parent=/bodyset/humerus_l translation=(0 0 0)
      SpatialTransform: axes_held_at_zero=(translation1 translation2 translation3)
        TransformAxis rotation1: coordinates=shoulder_flexion_l axis=(0 0 1) LinearFunction(coefficients=1 0)
        TransformAxis rotation2: coordinates=shoulder_adduction_l axis=(1 0 0) LinearFunction(coefficients=-1 0)
        TransformAxis rotation3: coordinates=shoulder_rotation_l axis=(0 1 0) LinearFunction(coefficients=-1 0)
    PinJoint elbow_l: socket_parent_frame=humerus_l_offset socket_child_frame=ulna_l_offset
      Coordinate elbow_flexion_l: range=(0 2.618)
      PhysicalOffsetFrame humerus_l_offset: socket_parent=/bodyset/humerus_l translation=(0.013144 -0.3010966 0.009595)
          orientation=(0.02286271 -0.2280177 0.005168901)
      PhysicalOffsetFrame ulna_l_offset: socket_parent=/bodyset/ulna_l translation=(0 0 0)
          orientation=(0.02286271 -0.2280177 0.005168901)
    WeldJoint radioulnar_l: socket_parent_frame=ulna_l_offset socket_child_frame=radius_l_offset
      PhysicalOffsetFrame ulna_l_offset: socket_parent=/bodyset/ulna_l translation=(-0.006727 -0.01307437 -0.026083)
          orientation=(1.568841 -0.05642797 1.536144)
      PhysicalOffsetFrame radius_l_offset: socket_parent=/bodyset/radius_l translation=(0 0 0)
          orientation=(1.568841 -0.05642797 -0.0346525)
    WeldJoint wrist_l: socket_parent_frame=radius_l_offset socket_child_frame=hand_l_offset
      PhysicalOffsetFrame radius_l_offset: socket_parent=/bodyset/radius_l translation=(-0.008797 -0.2263353 -0.01361)
      PhysicalOffsetFrame hand_l_offset: socket_parent=/bodyset/hand_l translation=(0 0 0)
  ConstraintSet:
    CoordinateCouplerConstraint patellofemoral_knee_angle_l_con: independent_coordinate_names=knee_angle_l
        dependent_coordinate_name=knee_angle_l_beta scale_factor=1
        coupled_coordinates_function=LinearFunction(coefficients=-1 0)
  SmoothSphereHalfSpaceForce [values shared by the 12 below unless stated]: socket_half_space=/contactgeometryset/floor
      stiffness=3067776 [N/m^2] dissipation=2 [s/m] static_friction=0.8 dynamic_friction=0.8 viscous_friction=0.5
      transition_velocity=0.2 [m/s] hertz_smoothing=300 hunt_crossley_smoothing=50
  SmoothSphereHalfSpaceForce contactHeel_r: socket_sphere=/contactgeometryset/heel_r
  SmoothSphereHalfSpaceForce contactLateralRearfoot_r: socket_sphere=/contactgeometryset/lateralRearfoot_r
  SmoothSphereHalfSpaceForce contactLateralMidfoot_r: socket_sphere=/contactgeometryset/lateralMidfoot_r
  SmoothSphereHalfSpaceForce contactLateralToe_r: socket_sphere=/contactgeometryset/lateralToe_r
  SmoothSphereHalfSpaceForce contactMedialToe_r: socket_sphere=/contactgeometryset/medialToe_r
  SmoothSphereHalfSpaceForce contactMedialMidfoot_r: socket_sphere=/contactgeometryset/medialMidfoot_r
  SmoothSphereHalfSpaceForce contactHeel_l: socket_sphere=/contactgeometryset/heel_l
  SmoothSphereHalfSpaceForce contactLateralRearfoot_l: socket_sphere=/contactgeometryset/lateralRearfoot_l
  SmoothSphereHalfSpaceForce contactLateralMidfoot_l: socket_sphere=/contactgeometryset/lateralMidfoot_l
  SmoothSphereHalfSpaceForce contactLateralToe_l: socket_sphere=/contactgeometryset/lateralToe_l
  SmoothSphereHalfSpaceForce contactMedialToe_l: socket_sphere=/contactgeometryset/medialToe_l
  SmoothSphereHalfSpaceForce contactMedialMidfoot_l: socket_sphere=/contactgeometryset/medialMidfoot_l
  MarkerSet:
    Marker R_IAS: pelvis (0.025956 0.01650125 0.132181) fixed=true
    Marker L_IAS: pelvis (0.03524697 -0.02005557 -0.1347677) fixed=true
    Marker R_IPS: pelvis (-0.1563997 0.035 0.04560446) fixed=true
    Marker L_IPS: pelvis (-0.15635 0.035 -0.04560446) fixed=true
    Marker R_FLE: femur_r (0.008802718 -0.4508371 0.05094778) fixed=true
    Marker R_FME: femur_r (0 -0.449482 -0.0507887) fixed=true
    Marker L_TAM: tibia_l (0.004113319 -0.4663044 0.04103835) fixed=true
    Marker L_FAL: tibia_l (-0.008734737 -0.4667013 -0.05020973) fixed=true
    Marker L_FCC: calcn_l (-0.03358001 0.008106458 0.01404775) fixed=true
    Marker L_FM1: toes_l (0.02448154 0.02018299 0.02966676) fixed=true
    Marker L_FM2: toes_l (0.02521777 0.01909071 -0.002051862) fixed=true
    Marker L_FM5: toes_l (-0.03228494 0.001774683 -0.07538709) fixed=true
    Marker L_FLE: femur_l (-0.01 -0.4314878 -0.06079267) fixed=true
    Marker L_FME: femur_l (0 -0.4311879 0.06139535) fixed=true
    Marker R_TAM: shintube_foot (0.04149856 -0.2069861 0.005335092) fixed=true
    Marker R_FAL: shintube_foot (-0.0424168 -0.2062822 -0.003778425) fixed=true
    Marker R_FCC: shintube_foot (-0.004125037 -0.2458385 -0.07439708) fixed=true
    Marker R_FM5: shintube_foot (-0.04953821 -0.2219821 0.1413362) fixed=true
    Marker R_FM2: shintube_foot (0.001519882 -0.2059829 0.1734874) fixed=true
    Marker R_FM1: shintube_foot (0.04995499 -0.2229312 0.1403458) fixed=true
    Marker R_TH2: femur_r (0.07093211 -0.2195066 0.09778303)
    Marker R_TH1: femur_r (0.00637752 -0.2195524 0.1064189)
    Marker R_TH4: femur_r (0.001593704 -0.2982235 0.07930396)
    Marker R_TH3: femur_r (0.06744269 -0.3019127 0.07075217)
    Marker L_TH1: femur_l (0.04341664 -0.2090193 -0.09289096)
    Marker L_TH2: femur_l (-0.02496466 -0.2061934 -0.09933346)
    Marker L_TH3: femur_l (-0.02742247 -0.2915433 -0.07801375)
    Marker L_TH4: femur_l (0.03753354 -0.2881668 -0.08075182)
    Marker L_SK2: tibia_l (-0.06102663 -0.1884511 -0.08512179)
    Marker L_SK1: tibia_l (0.00103231 -0.1863208 -0.07931894)
    Marker L_SK4: tibia_l (0.002887823 -0.269843 -0.0686332)
    Marker L_SK3: tibia_l (-0.06444847 -0.274357 -0.07173064)
    Marker R_SK1: front_link (0.04371435 -0.2732507 -0.05935716)
    Marker R_SK2: front_link (-0.01597481 -0.273818 -0.06363977)
    Marker R_SK3: front_link (-0.01791625 -0.3613543 -0.05514479)
    Marker R_SK4: front_link (0.04521974 -0.3547235 -0.04898865)
    Marker PRS1: cylinder (0.03789795 0.1086516 0.02106433)
    Marker PRS2: cylinder (0.04407402 0.1114866 -0.02743527)
    Marker PRS4: cylinder (0.04070328 0.01239922 0.01719556)
    Marker PRS3: cylinder (0.04573485 0.01396048 -0.02111926)
    Marker L_RSP: radius_l (-0.01142583 -0.2196363 -0.05428592) fixed=true
    Marker L_USP: ulna_l (-0.04431444 -0.249257 -0.02265477) fixed=true
    Marker L_HM2: hand_l (-0.01335982 -0.1069448 -0.01709663) fixed=true
    Marker L_HLE: humerus_l (0.01071841 -0.3017191 -0.04023273) fixed=true
    Marker L_HME: humerus_l (0.00405703 -0.3030229 0.04851487) fixed=true
    Marker L_HUM: humerus_l (0.006499112 -0.1390648 -0.06240006)
    Marker L_SAE: torso (0.004675234 0.4143444 -0.1373954) fixed=true
    Marker L_HEAD: torso (0.03283284 0.6064635 -0.07863873) fixed=true
    Marker SGL: torso (0.09174048 0.6285377 -0.004633411) fixed=true
    Marker R_HEAD: torso (0.03361159 0.6076726 0.07914708) fixed=true
    Marker R_SAE: humerus_r (0.001701643 0.0617112 0.003945335) fixed=true
    Marker R_HLE: humerus_r (0.01347915 -0.3074044 0.04270274) fixed=true
    Marker R_HME: humerus_r (-0.01726919 -0.296337 -0.04400663)
    Marker R_HUM: humerus_r (-0.005120131 -0.150498 0.04384891)
    Marker R_RSP: radius_r (-0.01741256 -0.2245995 0.06013571) fixed=true
    Marker R_USP: ulna_r (-0.04809954 -0.2521436 0.01812069) fixed=true
    Marker R_HM2: hand_r (-0.005490708 -0.1133075 0.01662602) fixed=true
    Marker CV7: torso (-0.097894 0.4258632 0.00339514) fixed=true
    Marker TV10: torso (-0.1196172 0.2301367 0.004427778) fixed=true
    Marker R_SIA: torso (-0.1261625 0.2496574 0.1249361) fixed=true
    Marker L_SIA: torso (-0.1225816 0.245789 -0.1039381) fixed=true
  ContactGeometrySet:
    ContactHalfSpace floor: socket_frame=/ground orientation=(0 0 -1.570796)
    ContactSphere heel_r: socket_frame=/bodyset/shintube_foot location=(0 -0.245 -0.06) radius=0.035
    ContactSphere lateralRearfoot_r: socket_frame=/bodyset/shintube_foot location=(-0.04 -0.245 0.02) radius=0.035
    ContactSphere lateralMidfoot_r: socket_frame=/bodyset/shintube_foot location=(-0.05 -0.23 0.1) radius=0.035
    ContactSphere lateralToe_r: socket_frame=/bodyset/shintube_foot location=(-0.02 -0.225 0.16) radius=0.035
    ContactSphere medialToe_r: socket_frame=/bodyset/shintube_foot location=(0.03 -0.215 0.17) radius=0.035
    ContactSphere medialMidfoot_r: socket_frame=/bodyset/shintube_foot location=(0.03 -0.225 0.11) radius=0.035
    ContactSphere heel_l: socket_frame=/bodyset/calcn_l location=(0.0146421 0 0.0122799) radius=0.035
    ContactSphere lateralRearfoot_l: socket_frame=/bodyset/calcn_l location=(0.0849291 0 -0.0338649) radius=0.035
    ContactSphere lateralMidfoot_l: socket_frame=/bodyset/calcn_l location=(0.153362 0 -0.0594829) radius=0.035
    ContactSphere lateralToe_l: socket_frame=/bodyset/toes_l location=(0.023014 0 -0.0670461) radius=0.035
    ContactSphere medialToe_l: socket_frame=/bodyset/toes_l location=(0.074363 0 0.026039) radius=0.035
    ContactSphere medialMidfoot_l: socket_frame=/bodyset/calcn_l location=(0.203637 0 0.0398688) radius=0.035
