# OpenSim document version 40000
Model:
  Ground
  BodySet:
    Body pelvis: mass=20.6934 [kg] mass_center=(-0.0720657 0 0) inertia=(0.223241 0.223241 0.101319 0 0 0)
        meshes=(sacrum.vtp pelvis.vtp l_pelvis.vtp)
    Body spine: mass=2.073633 mass_center=(0 0.248103 0) inertia=(0.0733226 0.0263733 0.0733226 0 0 0)
        meshes=tlspine.vtp
    Body lclavicle: mass=0.7959 mass_center=(-0.0340615 0.0189609 -0.111608)
        inertia=(0.000278934 0.000302179 4.6489e-5 -2.32445e-5 -8.13558e-5 5.81113e-5) meshes=lclavicle.vtp
    Body lscapula: mass=3.6384 mass_center=(-0.0535754 -0.0591467 0.0291475)
        inertia=(0.00104934 0.000973176 0.00115935 0.000380808 0.000346959 0.000203098) meshes=lscapula.vtp
    Body humerus_l: mass=3.8658 mass_center=(0 -0.166071 0) inertia=(0.0221425 0.00763849 0.0248543 0 0 0)
        meshes=humerus_lv.vtp
    Body torso: mass=23.28147 mass_center=(0 0.133963 0) inertia=(1.50733 1.34273 1.50733 0 0 0) meshes=ribcage.vtp
    Body cerv7: mass=0.9096 mass_center=(-0.000199345 0.00707675 0) inertia=(0.0276027 0.110411 0.0276027 0 0 0)
        meshes=rotatedcerv7.vtp
      WrapTorus Trap_neck_bend_r: xyz_body_rotation=(0.7854 0.7854 0) translation=(-0.05173 0.034088 0.0591058)
          quadrant=all inner_radius=0.00996725 outer_radius=0.01495088
      WrapTorus Trap_neck_bend_l: xyz_body_rotation=(-0.7854 -0.7854 0) translation=(-0.05173 0.034088 -0.0591058)
          quadrant=all inner_radius=0.00996725 outer_radius=0.01495088
    Body cerv6: mass=0.7959 mass_center=(0.000199345 0.00637904 0) inertia=(0.0282245 0.112898 0.0282245 0 0 0)
        meshes=cerv6.vtp
      WrapCylinder SCM_wrap: translation=(-0.00996725 0 0) quadrant=x radius=0.02541649 length=0.199345
    Body cerv5: mass=0.6822 mass_center=(9.96725e-5 0.00627937 0) inertia=(0.029223 0.116892 0.029223 0 0 0)
        meshes=cerv5.vtp
    Body cerv4: mass=0.6822 mass_center=(-0.000299018 0.00667806 0) inertia=(0.0296222 0.118489 0.0296222 0 0 0)
        meshes=cerv4.vtp
    Body cerv3: mass=0.6822 mass_center=(-0.00079738 0.00707675 0) inertia=(0.029867 0.119468 0.029867 0 0 0)
        meshes=cerv3.vtp
    Body cerv2: mass=0.9096 mass_center=(-0.000996725 0.00588068 0) inertia=(0.0274397 0.109759 0.0274397 0 0 0)
        meshes=cerv2.vtp
      WrapSphere SCM_sphere: translation=(0 0 0) quadrant=all radius=0.02
      WrapCylinder Extensor_c2_wrap_r: xyz_body_rotation=(-0.2254 0.2478 0) translation=(-0.073 0.004 0.0199345)
          quadrant=x radius=0.018 length=0.199345
      WrapCylinder Extensor_c2_wrap_l: xyz_body_rotation=(0.2254 -0.2478 0) translation=(-0.073 0.004 -0.0199345)
          quadrant=x radius=0.018 length=0.199345
    Body cerv1: mass=0.6822 mass_center=(0.0310978 0.00189378 0) inertia=(0.0306697 0.122679 0.0306697 0 0 0)
        meshes=cerv1.vtp
    Body skull: mass=4.6617 mass_center=(0 0.075588 0) inertia=(0.0366493 0.0123511 0.0366493 0 0 0) meshes=skull.vtp
    Body jaw: mass=0.6822 mass_center=(0 0.0559083 0) inertia=(0.0436981 0.0197618 0.0436981 0 0 0) meshes=jaw.vtp
    Body rclavicle: mass=0.7959 mass_center=(-0.0339403 0.0188934 0.111211)
        inertia=(0.000276952 0.000300031 4.61587e-5 -2.30793e-5 -8.07777e-5 5.76983e-5) meshes=rclavicle.vtp
    Body rscapula: mass=3.6384 mass_center=(-0.04891 -0.0539962 -0.0266093)
        inertia=(0.000874542 0.000811067 0.000966228 0.000317374 0.000289163 0.000169266) meshes=rscapula.vtp
    Body humerus_r: mass=3.8658 mass_center=(0 -0.161379 0) inertia=(0.0209088 0.00721289 0.0234695 0 0 0)
        meshes=humerus_rv.vtp
    Body ulna_l: mass=1.137 mass_center=(0 -0.116292 0) inertia=(0.00502909 0.00104928 0.00545526 0 0 0)
        meshes=ulna_lv.vtp
    Body radius_l: mass=1.137 mass_center=(0 -0.116292 0) inertia=(0.00502909 0.00104928 0.00545526 0 0 0)
        meshes=radius_lv.vtp
    Body hand_l: mass=0.28425 mass_center=(0 -0.0788406 0) inertia=(0.00176462 0.00108212 0.00265089 0 0 0)
        meshes=(pisiform_lvs.vtp lunate_lvs.vtp scaphoid_lvs.vtp triquetrum_lvs.vtp hamate_lvs.vtp capitate_lvs.vtp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)
    Body ulna_r: mass=1.137 mass_center=(0 -0.119666 0) inertia=(0.00532514 0.00111105 0.0057764 0 0 0)
        meshes=ulna_rv.vtp
    Body radius_r: mass=1.137 mass_center=(0 -0.119666 0) inertia=(0.00532514 0.00111105 0.0057764 0 0 0)
        meshes=radius_rv.vtp
    Body hand_r: mass=0.28425 mass_center=(0 -0.0745511 0) inertia=(0.00157783 0.000967572 0.00237029 0 0 0)
        meshes=(pisiform_rvs.vtp lunate_rvs.vtp scaphoid_rvs.vtp triquetrum_rvs.vtp hamate_rvs.vtp capitate_rvs.vtp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)
    Body femur_r: mass=11.2563 mass_center=(0 -0.17 0) inertia=(0.17275 0.04528 0.18217 0 0 0) meshes=femur_r.vtp
    Body tibia_r: mass=4.548 mass_center=(0 -0.1867 0) inertia=(0.0465 0.0082 0.0465 0 0 0)
        meshes=(tibia_r.vtp fibula_r.vtp)
    Body talus_r: mass=0.1137 mass_center=(0 0 0) inertia=(0.001 0.001 0.001 0 0 0) meshes=talus.vtp
    Body calcn_r: mass=1.4781 mass_center=(0.1 0.03 0) inertia=(0.00179 0.00499 0.00525 0 0 0) meshes=foot.vtp
    Body toes_r: mass=0.2274 mass_center=(0.0346 0.006 -0.0175) inertia=(0.00014 0.00028 0.00139 0 0 0)
        meshes=bofoot.vtp
    Body femur_l: mass=11.2563 mass_center=(0 -0.17 0) inertia=(0.17275 0.04528 0.18217 0 0 0) meshes=l_femur.vtp
    Body tibia_l: mass=4.548 mass_center=(0 -0.1867 0) inertia=(0.0465 0.0082 0.0465 0 0 0)
        meshes=(l_tibia.vtp l_fibula.vtp)
    Body talus_l: mass=0.1137 mass_center=(0 0 0) inertia=(0.001 0.001 0.001 0 0 0) meshes=l_talus.vtp
    Body calcn_l: mass=1.4781 mass_center=(0.1 0.03 0) inertia=(0.00179 0.00499 0.00525 0 0 0) meshes=l_foot.vtp
    Body toes_l: mass=0.2274 mass_center=(0.0346 0.006 -0.0175) inertia=(0.00014 0.00028 0.00139 0 0 0)
        meshes=l_bofoot.vtp
    Body punching_bag: mass=50 inertia=(5.19429 0.7225 5.19429 0 0 0)
      PhysicalOffsetFrame high_cylinderFrame: socket_parent=.. translation=(0 0 0) [meters]
      Cylinder punching_bag_geom: radius=0.17 half_height=0.5386
  JointSet:
    CustomJoint pelvisjnt: socket_parent_frame=ground_offset socket_child_frame=pelvis_offset
      Coordinate gndpitch: default_value=0 range=(-3.141593 3.141593) clamped=false
      Coordinate gndroll: default_value=0 range=(-3.141593 3.141593) clamped=false
      Coordinate gndyaw: default_value=0 range=(-3.141593 3.141593) clamped=false
      Coordinate pelvis_tx: default_value=-1.5 range=(-5 5) clamped=false
      Coordinate pelvis_ty: default_value=0.41 range=(-1 2) clamped=false
      Coordinate pelvis_tz: default_value=0 range=(-3 3) clamped=false
      PhysicalOffsetFrame ground_offset: socket_parent=/ground translation=(0.08 -0.173 0)
      PhysicalOffsetFrame pelvis_offset: socket_parent=/bodyset/pelvis translation=(0 0 0)
      SpatialTransform:
        TransformAxis rotation1: coordinates=gndpitch axis=(0 0 1) LinearFunction(coefficients=1 0)
        TransformAxis rotation2: coordinates=gndroll axis=(1 0 0) LinearFunction(coefficients=1 0)
        TransformAxis rotation3: coordinates=gndyaw axis=(0 1 0) LinearFunction(coefficients=1 0)
        TransformAxis translation1: coordinates=pelvis_tx axis=(1 0 0) LinearFunction(coefficients=1 0)
        TransformAxis translation2: coordinates=pelvis_ty axis=(0 1 0) LinearFunction(coefficients=1 0)
        TransformAxis translation3: coordinates=pelvis_tz axis=(0 0 1) LinearFunction(coefficients=1 0)
    CustomJoint spine_pelvis: socket_parent_frame=pelvis_offset socket_child_frame=spine_offset
      Coordinate spine_tilt: default_value=0 range=(-3.14159 3.14159) clamped=true
      Coordinate spine_list: default_value=0 range=(-3.14159 3.14159) clamped=true
      Coordinate spine_rotation: default_value=0 range=(-3.14159 3.14159) clamped=true
      PhysicalOffsetFrame pelvis_offset: socket_parent=/bodyset/pelvis translation=(-0.0815453 0 0)
      PhysicalOffsetFrame spine_offset: socket_parent=/bodyset/spine translation=(0 0 0)
      SpatialTransform: axes_held_at_zero=(translation1 translation2 translation3)
        TransformAxis rotation1: coordinates=spine_tilt axis=(0 0 1) LinearFunction(coefficients=1 0)
        TransformAxis rotation2: coordinates=spine_list axis=(1 0 0) LinearFunction(coefficients=1 0)
        TransformAxis rotation3: coordinates=spine_rotation axis=(0 1 0) LinearFunction(coefficients=1 0)
    CustomJoint auxSTERNljnt: socket_parent_frame=spine_offset socket_child_frame=lclavicle_offset
      Coordinate auxSTERNljnt_r1: default_value=0.1844375 range=(-1.570796 1.570796) clamped=false
      Coordinate auxSTERNljnt_r2: default_value=0.4038863 range=(-1.570796 1.570796) clamped=false
      Coordinate auxSTERNljnt_r3: default_value=0.00939234 range=(-1.570796 1.570796) clamped=false
      PhysicalOffsetFrame spine_offset: socket_parent=/bodyset/spine translation=(-0.0157823 0.567447 -0.0254492)
          orientation=(-0.02 -0.13 -0.1) [radians]
      PhysicalOffsetFrame lclavicle_offset: socket_parent=/bodyset/lclavicle translation=(0 0 0)
          orientation=(0.2 0.4 0)
      SpatialTransform: axes_held_at_zero=(translation1 translation2 translation3)
        TransformAxis rotation1: coordinates=auxSTERNljnt_r1 axis=(1 0 0) LinearFunction(coefficients=1 0)
        TransformAxis rotation2: coordinates=auxSTERNljnt_r2 axis=(0 1 0) LinearFunction(coefficients=1 0)
        TransformAxis rotation3: coordinates=auxSTERNljnt_r3 axis=(0 0 1) LinearFunction(coefficients=1 0)
    CustomJoint auxSCAPljnt: socket_parent_frame=lclavicle_offset socket_child_frame=lscapula_offset
      Coordinate rollLSCA: default_value=0.9203432 range=(-1.570796 1.570796) clamped=true
      Coordinate pitchLSCA: default_value=-0.2042049 range=(-1.570796 1.570796) clamped=true
      Coordinate yawLSCA: default_value=0.007365473 range=(-1.570796 1.570796) clamped=true
      PhysicalOffsetFrame lclavicle_offset: socket_parent=/bodyset/lclavicle translation=(-0.0738 -0.0227077 -0.158954)
          orientation=(-0.78 0.3 0.14)
      PhysicalOffsetFrame lscapula_offset: socket_parent=/bodyset/lscapula
          translation=(-0.0290647 -0.0532853 0.00775059) orientation=(0.45 -1 0.1)
      SpatialTransform: axes_held_at_zero=(translation1 translation2 translation3)
        TransformAxis rotation1: coordinates=rollLSCA axis=(1 0 0) LinearFunction(coefficients=1 0.0106)
        TransformAxis rotation2: coordinates=pitchLSCA axis=(0 -1 0) LinearFunction(coefficients=-1 0.7)
        TransformAxis rotation3: coordinates=yawLSCA axis=(0 0 1) LinearFunction(coefficients=1 -0.03888)
    CustomJoint acromial_l: socket_parent_frame=lscapula_offset socket_child_frame=humerus_l_offset
      Coordinate arm_flex_l: default_value=5.037159e-8 range=(-0.34889 2.792527) clamped=true
      Coordinate arm_add_l: default_value=-6.739585e-9 range=(-2.61667 1.570796) clamped=true
      Coordinate arm_rot_l: default_value=7.35265e-9 range=(-1.570796 2.792527) clamped=true
      PhysicalOffsetFrame lscapula_offset: socket_parent=/bodyset/lscapula
          translation=(-0.00871941 -0.038753 -0.0193765) orientation=(0.3 -0.3 0.3)
      PhysicalOffsetFrame humerus_l_offset: socket_parent=/bodyset/humerus_l translation=(0 0 0)
      SpatialTransform: axes_held_at_zero=(translation1 translation2 translation3)
        TransformAxis rotation1: coordinates=arm_flex_l axis=(0 0 1) LinearFunction(coefficients=1 0)
        TransformAxis rotation2: coordinates=arm_add_l axis=(-1 0 0) LinearFunction(coefficients=1 0)
        TransformAxis rotation3: coordinates=arm_rot_l axis=(0 -1 0) LinearFunction(coefficients=1 0)
    WeldJoint ribcagejnt: socket_parent_frame=spine_offset socket_child_frame=torso_offset
      PhysicalOffsetFrame spine_offset: socket_parent=/bodyset/spine translation=(0 0.193131 0)
      PhysicalOffsetFrame torso_offset: socket_parent=/bodyset/torso translation=(0 0 0)
    CustomJoint auxt1jnt: socket_parent_frame=spine_offset socket_child_frame=cerv7_offset
      Coordinate auxt1jnt_r3: default_value=0 range=(-0.5759587 0.837758) clamped=true
      Coordinate auxt1jnt_r1: default_value=-2.906733e-19 range=(-0.5759587 0.5759587) clamped=true
      Coordinate auxt1jnt_r2: default_value=-1.027301e-19 range=(-0.4712389 0.4712389) clamped=true
      Coordinate auxt1jnt_t3: default_value=4.87075e-7 range=(-0.01 0.01) clamped=true
      Coordinate auxt1jnt_t1: default_value=4.87075e-7 range=(-0.01 0.01) clamped=true
      Coordinate auxt1jnt_t2: default_value=4.87075e-7 range=(-0.01 0.01) clamped=true
      PhysicalOffsetFrame spine_offset: socket_parent=/bodyset/spine translation=(-0.0635305 0.596472 0)
      PhysicalOffsetFrame cerv7_offset: socket_parent=/bodyset/cerv7 translation=(0.0068176 -0.00563648 0)
      SpatialTransform:
        TransformAxis rotation1: coordinates=auxt1jnt_r3 axis=(0 0 1) LinearFunction(coefficients=1 0)
        TransformAxis rotation2: coordinates=auxt1jnt_r1 axis=(1 0 0) LinearFunction(coefficients=1 0)
        TransformAxis rotation3: coordinates=auxt1jnt_r2 axis=(0 1 0) LinearFunction(coefficients=1 0)
        TransformAxis translation1: coordinates=auxt1jnt_t3 axis=(0 0 1) LinearFunction(coefficients=1 0)
        TransformAxis translation2: coordinates=auxt1jnt_t1 axis=(1 0 0) LinearFunction(coefficients=1 0)
        TransformAxis translation3: coordinates=auxt1jnt_t2 axis=(0 1 0) LinearFunction(coefficients=1 0)
    CustomJoint aux7jnt: socket_parent_frame=cerv7_offset socket_child_frame=cerv6_offset
      Coordinate aux7jnt_r3: default_value=0 range=(-0.1745329 0.1745329) clamped=false
      Coordinate aux7jnt_r1: default_value=2.952552e-20 range=(-0.1745329 0.1745329) clamped=true
      Coordinate aux7jnt_r2: default_value=-3.08822e-20 range=(-0.1745329 0.1745329) clamped=true
      Coordinate aux7jnt_t3: default_value=8.954418e-8 range=(-0.01 0.01) clamped=true
      Coordinate aux7jnt_t1: default_value=8.954418e-8 range=(-0.01 0.01) clamped=true
      Coordinate aux7jnt_t2: default_value=8.954418e-8 range=(-0.01 0.01) clamped=true
      PhysicalOffsetFrame cerv7_offset: socket_parent=/bodyset/cerv7 translation=(0.0132126 0.0123395 0)
      PhysicalOffsetFrame cerv6_offset: socket_parent=/bodyset/cerv6 translation=(0.00938815 -0.00405169 0)
      SpatialTransform:
        TransformAxis rotation1: coordinates=aux7jnt_r3 axis=(0 0 1) LinearFunction(coefficients=1 0)
        TransformAxis rotation2: coordinates=aux7jnt_r1 axis=(1 0 0) LinearFunction(coefficients=1 0)
        TransformAxis rotation3: coordinates=aux7jnt_r2 axis=(0 1 0) LinearFunction(coefficients=1 0)
        TransformAxis translation1: coordinates=aux7jnt_t3 axis=(0 0 1) LinearFunction(coefficients=1 0)
        TransformAxis translation2: coordinates=aux7jnt_t1 axis=(1 0 0) LinearFunction(coefficients=1 0)
        TransformAxis translation3: coordinates=aux7jnt_t2 axis=(0 1 0) LinearFunction(coefficients=1 0)
    CustomJoint aux6jnt: socket_parent_frame=cerv6_offset socket_child_frame=cerv5_offset
      Coordinate aux6jnt_r3: default_value=-1.913381e-11 range=(-0.1745329 0.1745329) clamped=true
      Coordinate aux6jnt_r1: default_value=3.383587e-20 range=(-0.1745329 0.1745329) clamped=true
      Coordinate aux6jnt_r2: default_value=-3.597446e-20 range=(-0.1745329 0.1745329) clamped=true
      Coordinate aux6jnt_t3: default_value=1.053458e-7 range=(-0.01 0.01) clamped=true
      Coordinate aux6jnt_t1: default_value=1.053458e-7 range=(-0.01 0.01) clamped=true
      Coordinate aux6jnt_t2: default_value=1.053458e-7 range=(-0.01 0.01) clamped=true
      PhysicalOffsetFrame cerv6_offset: socket_parent=/bodyset/cerv6 translation=(0.00981774 0.00971807 0)
      PhysicalOffsetFrame cerv5_offset: socket_parent=/bodyset/cerv5 translation=(0.00565143 -0.00812331 0)
      SpatialTransform:
        TransformAxis rotation1: coordinates=aux6jnt_r3 axis=(0 0 1) LinearFunction(coefficients=1 0)
        TransformAxis rotation2: coordinates=aux6jnt_r1 axis=(1 0 0) LinearFunction(coefficients=1 0)
        TransformAxis rotation3: coordinates=aux6jnt_r2 axis=(0 1 0) LinearFunction(coefficients=1 0)
        TransformAxis translation1: coordinates=aux6jnt_t3 axis=(0 0 1) LinearFunction(coefficients=1 0)
        TransformAxis translation2: coordinates=aux6jnt_t1 axis=(1 0 0) LinearFunction(coefficients=1 0)
        TransformAxis translation3: coordinates=aux6jnt_t2 axis=(0 1 0) LinearFunction(coefficients=1 0)
    CustomJoint aux5jnt: socket_parent_frame=cerv5_offset socket_child_frame=cerv4_offset
      Coordinate aux5jnt_r3: default_value=-1.913381e-11 range=(-0.1745329 0.1745329) clamped=true
      Coordinate aux5jnt_r1: default_value=4.655119e-20 range=(-0.1745329 0.1745329) clamped=true
      Coordinate aux5jnt_r2: default_value=-3.597446e-20 range=(-0.1745329 0.1745329) clamped=true
      Coordinate aux5jnt_t3: default_value=1.053458e-7 range=(-0.01 0.01) clamped=true
      Coordinate aux5jnt_t1: default_value=1.053458e-7 range=(-0.01 0.01) clamped=true
      Coordinate aux5jnt_t2: default_value=1.053458e-7 range=(-0.01 0.01) clamped=true
      PhysicalOffsetFrame cerv5_offset: socket_parent=/bodyset/cerv5 translation=(0.00840239 0.0074256 0)
      PhysicalOffsetFrame cerv4_offset: socket_parent=/bodyset/cerv4 translation=(0.00500356 -0.0116816 0)
      SpatialTransform:
        TransformAxis rotation1: coordinates=aux5jnt_r3 axis=(0 0 1) LinearFunction(coefficients=1 0)
        TransformAxis rotation2: coordinates=aux5jnt_r1 axis=(1 0 0) LinearFunction(coefficients=1 0)
        TransformAxis rotation3: coordinates=aux5jnt_r2 axis=(0 1 0) LinearFunction(coefficients=1 0)
        TransformAxis translation1: coordinates=aux5jnt_t3 axis=(0 0 1) LinearFunction(coefficients=1 0)
        TransformAxis translation2: coordinates=aux5jnt_t1 axis=(1 0 0) LinearFunction(coefficients=1 0)
        TransformAxis translation3: coordinates=aux5jnt_t2 axis=(0 1 0) LinearFunction(coefficients=1 0)
    CustomJoint aux4jnt: socket_parent_frame=cerv4_offset socket_child_frame=cerv3_offset
      Coordinate aux4jnt_r3: default_value=-1.435036e-11 range=(-0.1745329 0.1745329) clamped=true
      Coordinate aux4jnt_r1: default_value=4.655119e-20 range=(-0.1745329 0.1745329) clamped=true
      Coordinate aux4jnt_r2: default_value=-3.597446e-20 range=(-0.1745329 0.1745329) clamped=true
      Coordinate aux4jnt_t3: default_value=7.900938e-8 range=(-0.01 0.01) clamped=true
      Coordinate aux4jnt_t1: default_value=7.900938e-8 range=(-0.01 0.01) clamped=true
      Coordinate aux4jnt_t2: default_value=7.900938e-8 range=(-0.01 0.01) clamped=true
      PhysicalOffsetFrame cerv4_offset: socket_parent=/bodyset/cerv4 translation=(0.00729603 0.00635911 0)
      PhysicalOffsetFrame cerv3_offset: socket_parent=/bodyset/cerv3 translation=(0.00469457 -0.00899046 0)
      SpatialTransform:
        TransformAxis rotation1: coordinates=aux4jnt_r3 axis=(0 0 1) LinearFunction(coefficients=1 0)
        TransformAxis rotation2: coordinates=aux4jnt_r1 axis=(1 0 0) LinearFunction(coefficients=1 0)
        TransformAxis rotation3: coordinates=aux4jnt_r2 axis=(0 1 0) LinearFunction(coefficients=1 0)
        TransformAxis translation1: coordinates=aux4jnt_t3 axis=(0 0 1) LinearFunction(coefficients=1 0)
        TransformAxis translation2: coordinates=aux4jnt_t1 axis=(1 0 0) LinearFunction(coefficients=1 0)
        TransformAxis translation3: coordinates=aux4jnt_t2 axis=(0 1 0) LinearFunction(coefficients=1 0)
    CustomJoint aux3jnt: socket_parent_frame=cerv3_offset socket_child_frame=cerv2_offset
      Coordinate aux3jnt_r3: default_value=-9.566906e-12 range=(-0.1745329 0.1745329) clamped=true
      Coordinate aux3jnt_r1: default_value=4.224097e-20 range=(-0.1745329 0.1745329) clamped=true
      Coordinate aux3jnt_r2: default_value=-1.54411e-20 range=(-0.1745329 0.1745329) clamped=true
      Coordinate aux3jnt_t3: default_value=5.267292e-8 range=(-0.01 0.01) clamped=true
      Coordinate aux3jnt_t1: default_value=5.267292e-8 range=(-0.01 0.01) clamped=true
      Coordinate aux3jnt_t2: default_value=5.267292e-8 range=(-0.01 0.01) clamped=true
      PhysicalOffsetFrame cerv3_offset: socket_parent=/bodyset/cerv3 translation=(0.00523281 0.00504343 0)
      PhysicalOffsetFrame cerv2_offset: socket_parent=/bodyset/cerv2 translation=(0.00541222 -0.0111932 0)
      SpatialTransform:
        TransformAxis rotation1: coordinates=aux3jnt_r3 axis=(0 0 1) LinearFunction(coefficients=1 0)
        TransformAxis rotation2: coordinates=aux3jnt_r1 axis=(1 0 0) LinearFunction(coefficients=1 0)
        TransformAxis rotation3: coordinates=aux3jnt_r2 axis=(0 1 0) LinearFunction(coefficients=1 0)
        TransformAxis translation1: coordinates=aux3jnt_t3 axis=(0 0 1) LinearFunction(coefficients=1 0)
        TransformAxis translation2: coordinates=aux3jnt_t1 axis=(1 0 0) LinearFunction(coefficients=1 0)
        TransformAxis translation3: coordinates=aux3jnt_t2 axis=(0 1 0) LinearFunction(coefficients=1 0)
    CustomJoint aux2jnt: socket_parent_frame=cerv2_offset socket_child_frame=cerv1_offset
      Coordinate aux2jnt_r3: default_value=7.093911e-10 range=(-0.2792527 0.3142) clamped=true
      Coordinate aux2jnt_r1: default_value=0 range=(-0.1047198 0.1047198) clamped=true
      Coordinate aux2jnt_r2: default_value=0 range=(-0.6632251 0.6632251) clamped=true
      PhysicalOffsetFrame cerv2_offset: socket_parent=/bodyset/cerv2 translation=(0.00686744 0.0212103 0)
      PhysicalOffsetFrame cerv1_offset: socket_parent=/bodyset/cerv1 translation=(0.042311 0.00350847 0)
      SpatialTransform: axes_held_at_zero=(translation1 translation2 translation3)
        TransformAxis rotation1: coordinates=aux2jnt_r3 axis=(0 0 1) LinearFunction(coefficients=1 0)
        TransformAxis rotation2: coordinates=aux2jnt_r1 axis=(1 0 0) LinearFunction(coefficients=1 0)
        TransformAxis rotation3: coordinates=aux2jnt_r2 axis=(0 1 0) LinearFunction(coefficients=1 0)
    CustomJoint aux1jnt: socket_parent_frame=cerv1_offset socket_child_frame=skull_offset
      Coordinate aux1jnt_r3: default_value=2.881202e-13 range=(-0.1745329 0.1745329) clamped=true
      Coordinate aux1jnt_r1: default_value=9.262542e-43 range=(-0.1745329 0.1745329) clamped=true
      Coordinate aux1jnt_r2: default_value=-1.447886e-11 range=(-0.1745329 0.1745329) clamped=true
      PhysicalOffsetFrame cerv1_offset: socket_parent=/bodyset/cerv1 translation=(0.043208 0.0148711 0)
      PhysicalOffsetFrame skull_offset: socket_parent=/bodyset/skull translation=(0 0 0)
      SpatialTransform: axes_held_at_zero=(translation1 translation2 translation3)
        TransformAxis rotation1: coordinates=aux1jnt_r3 axis=(0 0 1) LinearFunction(coefficients=1 0)
        TransformAxis rotation2: coordinates=aux1jnt_r1 axis=(1 0 0) LinearFunction(coefficients=1 0)
        TransformAxis rotation3: coordinates=aux1jnt_r2 axis=(0 1 0) LinearFunction(coefficients=1 0)
    WeldJoint jawjnt: socket_parent_frame=skull_offset socket_child_frame=jaw_offset
      PhysicalOffsetFrame skull_offset: socket_parent=/bodyset/skull translation=(0 0 0)
      PhysicalOffsetFrame jaw_offset: socket_parent=/bodyset/jaw translation=(0 0 0)
    CustomJoint auxSTERNrjnt: socket_parent_frame=spine_offset socket_child_frame=rclavicle_offset
      Coordinate auxSTERNrjnt_r1: default_value=0.1844375 range=(-1.570796 1.570796) clamped=false
      Coordinate auxSTERNrjnt_r2: default_value=0.4038863 range=(-1.570796 1.570796) clamped=false
      Coordinate auxSTERNrjnt_r3: default_value=0.00939234 range=(-1.570796 1.570796) clamped=false
      PhysicalOffsetFrame spine_offset: socket_parent=/bodyset/spine translation=(-0.0157823 0.567447 0.0254492)
          orientation=(0.02 0.13 -0.1)
      PhysicalOffsetFrame rclavicle_offset: socket_parent=/bodyset/rclavicle translation=(0 0 0)
          orientation=(-0.2 -0.4 0)
      SpatialTransform: axes_held_at_zero=(translation1 translation2 translation3)
        TransformAxis rotation1: coordinates=auxSTERNrjnt_r1 axis=(-1 0 0) LinearFunction(coefficients=1 0)
        TransformAxis rotation2: coordinates=auxSTERNrjnt_r2 axis=(0 -1 0) LinearFunction(coefficients=1 0)
        TransformAxis rotation3: coordinates=auxSTERNrjnt_r3 axis=(0 0 1) LinearFunction(coefficients=1 0)
    CustomJoint auxSCAPrjnt: socket_parent_frame=rclavicle_offset socket_child_frame=rscapula_offset
      Coordinate rollRSCA: default_value=0.9203432 range=(-1.570796 1.570796) clamped=true
      Coordinate pitchRSCA: default_value=-0.2042049 range=(-1.570796 1.570796) clamped=true
      Coordinate yawRSCA: default_value=0.007365473 range=(-1.570796 1.570796) clamped=true
      PhysicalOffsetFrame rclavicle_offset: socket_parent=/bodyset/rclavicle
          translation=(-0.0735373 -0.0226269 0.158388) orientation=(0.78 -0.3 0.14)
      PhysicalOffsetFrame rscapula_offset: socket_parent=/bodyset/rscapula
          translation=(-0.0265338 -0.0486452 -0.00707567) orientation=(-0.45 1 0.1)
      SpatialTransform: axes_held_at_zero=(translation1 translation2 translation3)
        TransformAxis rotation1: coordinates=rollRSCA axis=(1 0 0) LinearFunction(coefficients=-1 -0.0106)
        TransformAxis rotation2: coordinates=pitchRSCA axis=(0 -1 0) LinearFunction(coefficients=1 -0.7)
        TransformAxis rotation3: coordinates=yawRSCA axis=(0 0 1) LinearFunction(coefficients=1 -0.03888)
    CustomJoint acromial_r: socket_parent_frame=rscapula_offset socket_child_frame=humerus_r_offset
      Coordinate arm_flex_r: default_value=5.037159e-8 range=(-0.34889 2.792527) clamped=true
      Coordinate arm_add_r: default_value=-6.739585e-9 range=(-2.61667 1.570796) clamped=true
      Coordinate arm_rot_r: default_value=7.35265e-9 range=(-1.570796 2.792527) clamped=true
      PhysicalOffsetFrame rscapula_offset: socket_parent=/bodyset/rscapula
          translation=(-0.00796013 -0.0353783 0.0176892) orientation=(-0.3 0.3 0.3)
      PhysicalOffsetFrame humerus_r_offset: socket_parent=/bodyset/humerus_r translation=(0 0 0)
      SpatialTransform: axes_held_at_zero=(translation1 translation2 translation3)
        TransformAxis rotation1: coordinates=arm_flex_r axis=(0 0 1) LinearFunction(coefficients=1 0)
        TransformAxis rotation2: coordinates=arm_add_r axis=(1 0 0) LinearFunction(coefficients=1 0)
        TransformAxis rotation3: coordinates=arm_rot_r axis=(0 1 0) LinearFunction(coefficients=1 0)
    CustomJoint elbow_l: socket_parent_frame=humerus_l_offset socket_child_frame=ulna_l_offset
      Coordinate elbow_flex_l: default_value=0.3490659 range=(0 2.618) clamped=true
      PhysicalOffsetFrame humerus_l_offset: socket_parent=/bodyset/humerus_l
          translation=(0.0132694 -0.313947 0.00968654)
      PhysicalOffsetFrame ulna_l_offset: socket_parent=/bodyset/ulna_l translation=(0 0 0)
      SpatialTransform: axes_held_at_zero=(rotation2 rotation3 translation1 translation2 translation3)
        TransformAxis rotation1: coordinates=elbow_flex_l axis=(-0.226047 -0.022269 0.9738618)
            LinearFunction(coefficients=1 0)
    CustomJoint radioulnar_l: socket_parent_frame=ulna_l_offset socket_child_frame=radius_l_offset
      Coordinate pro_sup_l: default_value=0.5235988 range=(-2.094395 3.141593) clamped=true
      PhysicalOffsetFrame ulna_l_offset: socket_parent=/bodyset/ulna_l translation=(-0.00656832 -0.0125501 -0.0254677)
      PhysicalOffsetFrame radius_l_offset: socket_parent=/bodyset/radius_l translation=(0 0 0)
      SpatialTransform: axes_held_at_zero=(rotation2 rotation3 translation1 translation2 translation3)
        TransformAxis rotation1: coordinates=pro_sup_l axis=(-0.05639803 -0.9984065 0.001952)
            LinearFunction(coefficients=1 0)
    CustomJoint radius_hand_l: socket_parent_frame=radius_l_offset socket_child_frame=hand_l_offset
      Coordinate wrist_flex_l: default_value=7.917258e-25 range=(-1.22173 1.22173) clamped=true
      Coordinate wrist_dev_l: default_value=0.08726646 range=(-0.4363323 0.6108652) clamped=true locked=true
      PhysicalOffsetFrame radius_l_offset: socket_parent=/bodyset/radius_l
          translation=(-0.00858949 -0.227556 -0.013289)
      PhysicalOffsetFrame hand_l_offset: socket_parent=/bodyset/hand_l translation=(0 0 0)
      SpatialTransform: axes_held_at_zero=(rotation3 translation1 translation2 translation3)
        TransformAxis rotation1: coordinates=wrist_flex_l axis=(0 0 1) LinearFunction(coefficients=1 0)
        TransformAxis rotation2: coordinates=wrist_dev_l axis=(-1 0 0) LinearFunction(coefficients=1 0)
    CustomJoint elbow_r: socket_parent_frame=humerus_r_offset socket_child_frame=ulna_r_offset
      Coordinate elbow_flex_r: default_value=0.3490659 range=(0 2.618) clamped=true
      PhysicalOffsetFrame humerus_r_offset: socket_parent=/bodyset/humerus_r
          translation=(0.0128944 -0.305075 -0.00941282)
      PhysicalOffsetFrame ulna_r_offset: socket_parent=/bodyset/ulna_r translation=(0 0 0)
      SpatialTransform: axes_held_at_zero=(rotation2 rotation3 translation1 translation2 translation3)
        TransformAxis rotation1: coordinates=elbow_flex_r axis=(0.226047 0.022269 0.9738618)
            LinearFunction(coefficients=1 0)
    CustomJoint radioulnar_r: socket_parent_frame=ulna_r_offset socket_child_frame=radius_r_offset
      Coordinate pro_sup_r: default_value=0.5235988 range=(-2.094395 3.141593) clamped=true
      PhysicalOffsetFrame ulna_r_offset: socket_parent=/bodyset/ulna_r translation=(-0.00675888 -0.0129142 0.0262066)
      PhysicalOffsetFrame radius_r_offset: socket_parent=/bodyset/radius_r translation=(0 0 0)
      SpatialTransform: axes_held_at_zero=(rotation2 rotation3 translation1 translation2 translation3)
        TransformAxis rotation1: coordinates=pro_sup_r axis=(0.05639803 0.9984065 0.001952)
            LinearFunction(coefficients=1 0)
    CustomJoint radius_hand_r: socket_parent_frame=radius_r_offset socket_child_frame=hand_r_offset
      Coordinate wrist_flex_r: default_value=2.771937e-25 range=(-1.22173 1.22173) clamped=true
      Coordinate wrist_dev_r: default_value=0.08726646 range=(-0.4363323 0.6108652) clamped=true locked=true
      PhysicalOffsetFrame radius_r_offset: socket_parent=/bodyset/radius_r translation=(-0.0088387 -0.234158 0.0136745)
      PhysicalOffsetFrame hand_r_offset: socket_parent=/bodyset/hand_r translation=(0 0 0)
      SpatialTransform: axes_held_at_zero=(rotation3 translation1 translation2 translation3)
        TransformAxis rotation1: coordinates=wrist_flex_r axis=(0 0 1) LinearFunction(coefficients=1 0)
        TransformAxis rotation2: coordinates=wrist_dev_r axis=(1 0 0) LinearFunction(coefficients=1 0)
    CustomJoint hip_r: socket_parent_frame=pelvis_offset socket_child_frame=femur_r_offset
      Coordinate hip_flexion_r: default_value=1.17695e-11 range=(-2.094395 2.094395) clamped=true
      Coordinate hip_adduction_r: default_value=4.150182e-12 range=(-2.094395 2.094395) clamped=true
      Coordinate hip_rotation_r: default_value=5.191315e-12 range=(-2.094395 2.094395) clamped=true
      PhysicalOffsetFrame pelvis_offset: socket_parent=/bodyset/pelvis translation=(-0.0707 -0.0661 0.0835)
      PhysicalOffsetFrame femur_r_offset: socket_parent=/bodyset/femur_r translation=(0 0 0)
      SpatialTransform: axes_held_at_zero=(translation1 translation2 translation3)
        TransformAxis rotation1: coordinates=hip_flexion_r axis=(0 0 1) LinearFunction(coefficients=1 0)
        TransformAxis rotation2: coordinates=hip_adduction_r axis=(1 0 0) LinearFunction(coefficients=1 0)
        TransformAxis rotation3: coordinates=hip_rotation_r axis=(0 1 0) LinearFunction(coefficients=1 0)
    CustomJoint knee_r: socket_parent_frame=femur_r_offset socket_child_frame=tibia_r_offset
      Coordinate knee_angle_r: default_value=-4.793323e-9 range=(-2.094395 0.1745329) clamped=true
      PhysicalOffsetFrame femur_r_offset: socket_parent=/bodyset/femur_r translation=(-0.005013725 -0.3965857 0)
      PhysicalOffsetFrame tibia_r_offset: socket_parent=/bodyset/tibia_r translation=(0 0 0)
      SpatialTransform: axes_held_at_zero=(rotation2 rotation3 translation3)
        TransformAxis rotation1: coordinates=knee_angle_r axis=(0 0 1) LinearFunction(coefficients=1 0)
        TransformAxis translation1: coordinates=knee_angle_r axis=(1 0 0) LinearFunction(coefficients=1 0)
        TransformAxis translation2: coordinates=knee_angle_r axis=(0 1 0) LinearFunction(coefficients=1 0)
    CustomJoint ankle_r: socket_parent_frame=tibia_r_offset socket_child_frame=talus_r_offset
      Coordinate ankle_angle_r: default_value=-4.234282e-12 range=(-1.570796 1.570796) clamped=true
      PhysicalOffsetFrame tibia_r_offset: socket_parent=/bodyset/tibia_r translation=(0 -0.43 0)
      PhysicalOffsetFrame talus_r_offset: socket_parent=/bodyset/talus_r translation=(0 0 0)
      SpatialTransform: axes_held_at_zero=(rotation2 rotation3 translation1 translation2 translation3)
        TransformAxis rotation1: coordinates=ankle_angle_r axis=(-0.1050135 -0.1740224 0.9791263)
            LinearFunction(coefficients=1 0)
    CustomJoint subtalar_r: socket_parent_frame=talus_r_offset socket_child_frame=calcn_r_offset
      Coordinate subtalar_angle_r: default_value=0 range=(-1.570796 1.570796) clamped=true
      PhysicalOffsetFrame talus_r_offset: socket_parent=/bodyset/talus_r translation=(-0.04877 -0.04195 0.00792)
      PhysicalOffsetFrame calcn_r_offset: socket_parent=/bodyset/calcn_r translation=(0 0 0)
      SpatialTransform: axes_held_at_zero=(rotation2 rotation3 translation1 translation2 translation3)
        TransformAxis rotation1: coordinates=subtalar_angle_r axis=(0.7871796 0.6047475 -0.1209495)
            LinearFunction(coefficients=1 0)
    CustomJoint mtp_r: socket_parent_frame=calcn_r_offset socket_child_frame=toes_r_offset
      Coordinate mtp_angle_r: default_value=0 range=(-1.570796 1.570796) clamped=true locked=true
      PhysicalOffsetFrame calcn_r_offset: socket_parent=/bodyset/calcn_r translation=(0.1788 -0.002 0.00108)
      PhysicalOffsetFrame toes_r_offset: socket_parent=/bodyset/toes_r translation=(0 0 0)
      SpatialTransform: axes_held_at_zero=(rotation2 rotation3 translation1 translation2 translation3)
        TransformAxis rotation1: coordinates=mtp_angle_r axis=(-0.5809544 0 0.8139361) LinearFunction(coefficients=1 0)
    CustomJoint hip_l: socket_parent_frame=pelvis_offset socket_child_frame=femur_l_offset
      Coordinate hip_flexion_l: default_value=4.592572e-13 range=(-2.094395 2.094395) clamped=true
      Coordinate hip_adduction_l: default_value=3.443451e-12 range=(-2.094395 2.094395) clamped=true
      Coordinate hip_rotation_l: default_value=-2.682821e-12 range=(-2.094395 2.094395) clamped=true
      PhysicalOffsetFrame pelvis_offset: socket_parent=/bodyset/pelvis translation=(-0.0707 -0.0661 -0.0835)
      PhysicalOffsetFrame femur_l_offset: socket_parent=/bodyset/femur_l translation=(0 0 0)
      SpatialTransform: axes_held_at_zero=(translation1 translation2 translation3)
        TransformAxis rotation1: coordinates=hip_flexion_l axis=(0 0 1) LinearFunction(coefficients=1 0)
        TransformAxis rotation2: coordinates=hip_adduction_l axis=(-1 0 0) LinearFunction(coefficients=1 0)
        TransformAxis rotation3: coordinates=hip_rotation_l axis=(0 -1 0) LinearFunction(coefficients=1 0)
    CustomJoint knee_l: socket_parent_frame=femur_l_offset socket_child_frame=tibia_l_offset
      Coordinate knee_angle_l: default_value=-7.14809e-9 range=(-2.094395 0.1745329) clamped=true
      PhysicalOffsetFrame femur_l_offset: socket_parent=/bodyset/femur_l translation=(-0.005013725 -0.3965857 0)
      PhysicalOffsetFrame tibia_l_offset: socket_parent=/bodyset/tibia_l translation=(0 0 0)
      SpatialTransform: axes_held_at_zero=(rotation2 rotation3 translation3)
        TransformAxis rotation1: coordinates=knee_angle_l axis=(0 0 1) LinearFunction(coefficients=1 0)
        TransformAxis translation1: coordinates=knee_angle_l axis=(1 0 0) Constant(value=0)
        TransformAxis translation2: coordinates=knee_angle_l axis=(0 1 0) Constant(value=0)
    CustomJoint ankle_l: socket_parent_frame=tibia_l_offset socket_child_frame=talus_l_offset
      Coordinate ankle_angle_l: default_value=-6.832702e-13 range=(-1.047198 1.047198) clamped=true
      PhysicalOffsetFrame tibia_l_offset: socket_parent=/bodyset/tibia_l translation=(0 -0.43 0)
      PhysicalOffsetFrame talus_l_offset: socket_parent=/bodyset/talus_l translation=(0 0 0)
      SpatialTransform: axes_held_at_zero=(rotation2 rotation3 translation1 translation2 translation3)
        TransformAxis rotation1: coordinates=ankle_angle_l axis=(0.1050135 0.1740224 0.9791263)
            LinearFunction(coefficients=1 0)
    CustomJoint subtalar_l: socket_parent_frame=talus_l_offset socket_child_frame=calcn_l_offset
      Coordinate subtalar_angle_l: default_value=0 range=(-1.570796 1.570796) clamped=true locked=true
      PhysicalOffsetFrame talus_l_offset: socket_parent=/bodyset/talus_l translation=(-0.04877 -0.04195 -0.00792)
      PhysicalOffsetFrame calcn_l_offset: socket_parent=/bodyset/calcn_l translation=(0 0 0)
      SpatialTransform: axes_held_at_zero=(rotation2 rotation3 translation1 translation2 translation3)
        TransformAxis rotation1: coordinates=subtalar_angle_l axis=(-0.7871796 -0.6047475 -0.1209495)
            LinearFunction(coefficients=1 0)
    CustomJoint mtp_l: socket_parent_frame=calcn_l_offset socket_child_frame=toes_l_offset
      Coordinate mtp_angle_l: default_value=0 range=(-1.047198 1.047198) clamped=true locked=true
      PhysicalOffsetFrame calcn_l_offset: socket_parent=/bodyset/calcn_l translation=(0.1788 -0.002 -0.00108)
      PhysicalOffsetFrame toes_l_offset: socket_parent=/bodyset/toes_l translation=(0 0 0)
      SpatialTransform: axes_held_at_zero=(rotation2 rotation3 translation1 translation2 translation3)
        TransformAxis rotation1: coordinates=mtp_angle_l axis=(0.5809544 0 0.8139361) LinearFunction(coefficients=1 0)
    CustomJoint customJointPunchBag: socket_parent_frame=ground_offset socket_child_frame=punching_bag_offset
      Coordinate global_rotZ: default_value=0 range=(-3.141593 3.141593) clamped=true
      Coordinate global_rotX: default_value=0 range=(-3.141593 3.141593) clamped=true
      Coordinate global_rotY: default_value=0 range=(-3.141593 3.141593) clamped=true
      Coordinate global_tx: default_value=0 range=(-5 5) clamped=true
      Coordinate global_ty: default_value=0 range=(-5 5) clamped=true
      Coordinate global_tz: default_value=0 range=(-5 5) clamped=true
      PhysicalOffsetFrame ground_offset: socket_parent=/ground translation=(0 0 0)
      PhysicalOffsetFrame punching_bag_offset: socket_parent=/bodyset/punching_bag translation=(0 0 0)
      SpatialTransform:
        TransformAxis rotation1: coordinates=global_rotZ axis=(0 0 1) LinearFunction(coefficients=1 0)
        TransformAxis rotation2: coordinates=global_rotX axis=(1 0 0) LinearFunction(coefficients=1 0)
        TransformAxis rotation3: coordinates=global_rotY axis=(0 1 0) LinearFunction(coefficients=1 0)
        TransformAxis translation1: coordinates=global_tx axis=(1 0 0) LinearFunction(coefficients=1 0)
        TransformAxis translation2: coordinates=global_ty axis=(0 1 0) LinearFunction(coefficients=1 0)
        TransformAxis translation3: coordinates=global_tz axis=(0 0 1) LinearFunction(coefficients=1 0)
  ForceSet:
    Thelen2003Muscle stern_mast: max_isometric_force=186.165 optimal_fiber_length=0.1127513
        tendon_slack_length=0.05859204 pennation_angle_at_optimal=0.2617994 [radians]
      PathPoint P1: torso (-0.000936239 0.364939 0.0111051)
      PathPoint P2: skull (-0.00554953 0.00774889 0.0647615)
      PathWrap: wrap_object=SCM_wrap method=hybrid
      PathWrap pathwrap_0: wrap_object=SCM_sphere method=hybrid
    Thelen2003Muscle stern_mast_l: max_isometric_force=186.165 optimal_fiber_length=0.1127513
        tendon_slack_length=0.05859204 pennation_angle_at_optimal=0.2617994
      PathPoint P1: torso (-0.000936239 0.364939 -0.0111051)
      PathPoint P2: skull (-0.00554953 0.00774889 -0.0647615)
      PathWrap: wrap_object=SCM_wrap method=hybrid
      PathWrap pathwrap_0: wrap_object=SCM_sphere method=hybrid
    Thelen2003Muscle cleid_mast: max_isometric_force=93.0825 optimal_fiber_length=0.1122722
        tendon_slack_length=0.03659034 pennation_angle_at_optimal=0.2617994
      PathPoint P1: rclavicle (0.00438961 0.00613188 0.0398233)
      PathPoint P2: skull (-0.00554953 0.00774889 0.0647615)
      PathWrap: wrap_object=SCM_wrap method=hybrid
    Thelen2003Muscle cleid_mast_l: max_isometric_force=93.0825 optimal_fiber_length=0.112286
        tendon_slack_length=0.03659484 pennation_angle_at_optimal=0.2617994
      PathPoint P1: lclavicle (0.00454154 0.00567692 -0.0397385)
      PathPoint P2: skull (-0.00554953 0.00774889 -0.0647615)
      PathWrap: wrap_object=SCM_wrap method=hybrid
    Thelen2003Muscle cleid_occ: max_isometric_force=93.0825 optimal_fiber_length=0.1143143
        tendon_slack_length=0.07352846 pennation_angle_at_optimal=0.2617994
      PathPoint P1: rclavicle (0.00438961 0.00613188 0.0398233)
      PathPoint P2: skull (-0.038085 0.0257178 0.0668766)
      PathWrap: wrap_object=SCM_wrap method=hybrid
    Thelen2003Muscle cleid_occ_l: max_isometric_force=93.0825 optimal_fiber_length=0.1143125
        tendon_slack_length=0.07352728 pennation_angle_at_optimal=0.2617994
      PathPoint P1: lclavicle (0.00454154 0.0062318 -0.0397385)
      PathPoint P2: skull (-0.038085 0.0257178 -0.0668766)
      PathWrap: wrap_object=SCM_wrap method=hybrid
    Thelen2003Muscle scalenus_ant: max_isometric_force=138.915 optimal_fiber_length=0.04497959
        tendon_slack_length=0.05721083 pennation_angle_at_optimal=0.1745329
      PathPoint P1: torso (-0.0286088 0.371146 0.0611937)
      PathPoint P2: cerv4 (0.00710665 0.00787413 0.0231539)
    Thelen2003Muscle scalenus_ant_l: max_isometric_force=138.915 optimal_fiber_length=0.04497959
        tendon_slack_length=0.05721083 pennation_angle_at_optimal=0.1745329
      PathPoint P1: torso (-0.0286088 0.371146 -0.0611937)
      PathPoint P2: cerv4 (0.00710665 0.00787413 -0.0231539)
    Thelen2003Muscle scalenus_med: max_isometric_force=136.99 optimal_fiber_length=0.05284495
        tendon_slack_length=0.06500774 pennation_angle_at_optimal=0.1745329
      PathPoint P1: torso (-0.0454477 0.383281 0.0725302)
      PathPoint P2: cerv3 (-0.00899046 0.00977787 0.0211206)
    Thelen2003Muscle scalenus_med_l: max_isometric_force=136.99 optimal_fiber_length=0.05284495
        tendon_slack_length=0.06500774 pennation_angle_at_optimal=0.1745329
      PathPoint P1: torso (-0.0454477 0.383281 -0.0725302)
      PathPoint P2: cerv3 (-0.00899046 0.00977787 -0.0211206)
    Thelen2003Muscle scalenus_post: max_isometric_force=104.405 optimal_fiber_length=0.06924987
        tendon_slack_length=0.08136301 pennation_angle_at_optimal=0.1745329
      PathPoint P1: torso (-0.0486577 0.349086 0.12285)
      PathPoint P2: cerv5 (-0.00318952 0.0136651 0.0256158)
    Thelen2003Muscle scalenus_post_l: max_isometric_force=104.405 optimal_fiber_length=0.06924987
        tendon_slack_length=0.08136301 pennation_angle_at_optimal=0.1745329
      PathPoint P1: torso (-0.0486577 0.349086 -0.12285)
      PathPoint P2: cerv5 (-0.00318952 0.0136651 -0.0256158)
    Thelen2003Muscle long_cap_sklc4: max_isometric_force=89.964 optimal_fiber_length=0.03872374
        tendon_slack_length=0.04208354 pennation_angle_at_optimal=0.08726646
      PathPoint P1: cerv4 (0.00649865 0.0116019 0.0241207)
      PathPoint P2: cerv3 (0.0119308 0.010057 0.0189079)
      PathPoint P3: cerv2 (0.0171437 0.00826285 0.0147216)
      PathPoint P4: cerv1 (0.0579895 0.00307988 0.011552)
      PathPoint P5: skull (0.0106638 0.0178459 0.00362584)
    Thelen2003Muscle long_cap_sklc4_l: max_isometric_force=89.964 optimal_fiber_length=0.03872374
        tendon_slack_length=0.04208354 pennation_angle_at_optimal=0.08726646
      PathPoint P1: cerv4 (0.00649865 0.0116019 -0.0241207)
      PathPoint P2: cerv3 (0.0119308 0.010057 -0.0189079)
      PathPoint P3: cerv2 (0.0171437 0.00826285 -0.0147216)
      PathPoint P4: cerv1 (0.0579895 0.00307988 -0.011552)
      PathPoint P5: skull (0.0106638 0.0178459 -0.00362584)
    Thelen2003Muscle long_col_c1thx: max_isometric_force=25.839 optimal_fiber_length=0.09231275
        tendon_slack_length=0.09064422 pennation_angle_at_optimal=0.08726646
      PathPoint P1: spine (-0.0653763 0.531768 0.00428009)
      PathPoint P2: cerv7 (0.023124 0.0010964 0.0039869)
      PathPoint P3: cerv6 (0.0230642 0.00230243 0.00400683)
      PathPoint P4: cerv5 (0.022207 0.00227253 0.00388723)
      PathPoint P5: cerv4 (0.0219778 0.00329916 0.00377759)
      PathPoint P6: cerv3 (0.0220476 0.00601025 0.00366795)
      PathPoint P7: cerv2 (0.0211505 0.00969813 0.00354834)
      PathPoint P8: cerv1 (0.0580592 0.00480421 0.00308985)
    Thelen2003Muscle long_col_c1thx_l: max_isometric_force=25.839 optimal_fiber_length=0.09231275
        tendon_slack_length=0.09064422 pennation_angle_at_optimal=0.08726646
      PathPoint P1: spine (-0.0653763 0.531768 -0.00428009)
      PathPoint P2: cerv7 (0.023124 0.0010964 -0.0039869)
      PathPoint P3: cerv6 (0.0230642 0.00230243 -0.00400683)
      PathPoint P4: cerv5 (0.022207 0.00227253 -0.00388723)
      PathPoint P5: cerv4 (0.0219778 0.00329916 -0.00377759)
      PathPoint P6: cerv3 (0.0220476 0.00601025 -0.00366795)
      PathPoint P7: cerv2 (0.0211505 0.00969813 -0.00354834)
      PathPoint P8: cerv1 (0.0580592 0.00480421 -0.00308985)
    Thelen2003Muscle long_col_c1c5: max_isometric_force=25.839 optimal_fiber_length=0.03580236
        tendon_slack_length=0.03512359 pennation_angle_at_optimal=0.08726646
      PathPoint P1: cerv5 (0.00666809 0.00886089 0.0237221)
      PathPoint P2: cerv4 (0.0111733 0.00746547 0.0206322)
      PathPoint P3: cerv2 (0.017333 0.00158479 0.0136053)
      PathPoint P4: cerv1 (0.0570625 0.00480421 0.0061797)
    Thelen2003Muscle long_col_c1c5_l: max_isometric_force=25.839 optimal_fiber_length=0.03580236
        tendon_slack_length=0.03512359 pennation_angle_at_optimal=0.08726646
      PathPoint P1: cerv5 (0.00666809 0.00886089 -0.0237221)
      PathPoint P2: cerv4 (0.0111733 0.00746547 -0.0206322)
      PathPoint P3: cerv2 (0.017333 0.00158479 -0.0136053)
      PathPoint P4: cerv1 (0.0570625 0.00480421 -0.0061797)
    Thelen2003Muscle long_col_c5thx: max_isometric_force=25.839 optimal_fiber_length=0.06138438
        tendon_slack_length=0.05841431 pennation_angle_at_optimal=0.08726646
      PathPoint P1: spine (-0.0666201 0.531344 0.00786611)
      PathPoint P2: spine (-0.0645336 0.550668 0.0118223)
      PathPoint P3: spine (-0.0610696 0.566699 0.0154662)
      PathPoint P4: spine (-0.0597321 0.576713 0.0174443)
      PathPoint P5: spine (-0.056696 0.592599 0.0205676)
      PathPoint P6: cerv7 (0.0110736 0.00728606 0.0197252)
      PathPoint P7: cerv6 (0.00957853 0.00710665 0.0220874)
      PathPoint P8: cerv5 (0.00666809 0.00886089 0.0237221)
    Thelen2003Muscle long_col_c5thx_l: max_isometric_force=25.839 optimal_fiber_length=0.06138438
        tendon_slack_length=0.05841431 pennation_angle_at_optimal=0.08726646
      PathPoint P1: spine (-0.0666201 0.531344 -0.00786611)
      PathPoint P2: spine (-0.0645336 0.550668 -0.0118223)
      PathPoint P3: spine (-0.0610696 0.566699 -0.0154662)
      PathPoint P4: spine (-0.0597321 0.576713 -0.0174443)
      PathPoint P5: spine (-0.056696 0.592599 -0.0205676)
      PathPoint P6: cerv7 (0.0110736 0.00728606 -0.0197252)
      PathPoint P7: cerv6 (0.00957853 0.00710665 -0.0220874)
      PathPoint P8: cerv5 (0.00666809 0.00886089 -0.0237221)
    Thelen2003Muscle trap_cl: max_isometric_force=209.52 optimal_fiber_length=0.09109777 tendon_slack_length=0.1292959
        pennation_angle_at_optimal=0.5235988
      PathPoint P1: rclavicle (-0.0332615 0.0262472 0.0983138)
      PathPoint P2: skull (-0.0873887 0.029117 0.013335)
      PathWrap: wrap_object=Trap_neck_bend_r method=hybrid
    Thelen2003Muscle trap_cl_l: max_isometric_force=209.52 optimal_fiber_length=0.09114662
        tendon_slack_length=0.1293653 pennation_angle_at_optimal=0.5235988
      PathPoint P1: lclavicle (-0.0329262 0.0260792 -0.0987785)
      PathPoint P2: skull (-0.0873887 0.029117 -0.013335)
      PathWrap: wrap_object=Trap_neck_bend_l method=hybrid
    Thelen2003Muscle trap_acr: max_isometric_force=1017.765 optimal_fiber_length=0.103246
        tendon_slack_length=0.08594333 pennation_angle_at_optimal=0
      PathPoint P1: rscapula (-0.0210413 -0.00810164 -0.00650961)
      PathPoint P2: cerv7 (-0.0475438 0.0189378 0.00304001)
    Thelen2003Muscle trap_acr_l: max_isometric_force=1017.765 optimal_fiber_length=0.1038227
        tendon_slack_length=0.0864234 pennation_angle_at_optimal=0
      PathPoint P1: lscapula (-0.0230483 -0.00887443 0.00713054)
      PathPoint P2: cerv7 (-0.0475438 0.0189378 -0.00304001)
    Thelen2003Muscle splen_cap_sklc6: max_isometric_force=94.069 optimal_fiber_length=0.09658774
        tendon_slack_length=0.02644776 pennation_angle_at_optimal=0
      PathPoint P1: cerv6 (-0.0484408 0.0164161 0.00304001)
      PathPoint P2: skull (-0.0670731 0.0214464 0.0443158)
    Thelen2003Muscle splen_cap_sklc6_l: max_isometric_force=94.069 optimal_fiber_length=0.09658774
        tendon_slack_length=0.02644776 pennation_angle_at_optimal=0
      PathPoint P1: cerv6 (-0.0484408 0.0164161 -0.00304001)
      PathPoint P2: skull (-0.0670731 0.0214464 -0.0443158)
    Thelen2003Muscle splen_cap_sklthx: max_isometric_force=94.069 optimal_fiber_length=0.09925257
        tendon_slack_length=0.08552542 pennation_angle_at_optimal=0
      PathPoint P1: spine (-0.138884 0.5716 0.00347034)
      PathPoint P2: skull (-0.0436998 0.0122998 0.0546192)
      PathWrap: wrap_object=Extensor_c2_wrap_r method=midpoint
    Thelen2003Muscle splen_cap_sklthx_l: max_isometric_force=94.069 optimal_fiber_length=0.09925257
        tendon_slack_length=0.08552542 pennation_angle_at_optimal=0
      PathPoint P1: spine (-0.138884 0.5716 -0.00347034)
      PathPoint P2: skull (-0.0436998 0.0122998 -0.0546192)
      PathWrap: wrap_object=Extensor_c2_wrap_l method=midpoint
    Thelen2003Muscle splen_cerv_c3thx: max_isometric_force=94.069 optimal_fiber_length=0.1053993
        tendon_slack_length=0.1203083 pennation_angle_at_optimal=0
      PathPoint P1: spine (-0.17184 0.485863 0.0047428)
      PathPoint P2: cerv3 (-0.00784423 0.0100171 0.0235725)
    Thelen2003Muscle splen_cerv_c3thx_l: max_isometric_force=94.069 optimal_fiber_length=0.1053993
        tendon_slack_length=0.1203083 pennation_angle_at_optimal=0
      PathPoint P1: spine (-0.17184 0.485863 -0.0047428)
      PathPoint P2: cerv3 (-0.00784423 0.0100171 -0.0235725)
    Thelen2003Muscle semi_cap_sklc5: max_isometric_force=121.695 optimal_fiber_length=0.07133737
        tendon_slack_length=0.04884722 pennation_angle_at_optimal=0.08726646
      PathPoint P1: cerv5 (-0.00927951 0.0115022 0.023423)
      PathPoint P2: skull (-0.0809687 0.0223633 0.0181292)
      PathWrap: wrap_object=Extensor_c2_wrap_r method=midpoint
    Thelen2003Muscle semi_cap_sklc5_l: max_isometric_force=121.695 optimal_fiber_length=0.07133737
        tendon_slack_length=0.04884722 pennation_angle_at_optimal=0.08726646
      PathPoint P1: cerv5 (-0.00927951 0.0115022 -0.023423)
      PathPoint P2: skull (-0.0809687 0.0223633 -0.0181292)
      PathWrap: wrap_object=Extensor_c2_wrap_l method=midpoint
    Thelen2003Muscle semi_cap_sklthx: max_isometric_force=121.695 optimal_fiber_length=0.07062739
        tendon_slack_length=0.07155178 pennation_angle_at_optimal=0.08726646
      PathPoint P1: spine (-0.114208 0.614357 0.0401403)
      PathPoint P2: skull (-0.0834714 0.0223633 0.0111797)
      PathWrap: wrap_object=Extensor_c2_wrap_r method=midpoint
    Thelen2003Muscle semi_cap_sklthx_l: max_isometric_force=121.695 optimal_fiber_length=0.07062739
        tendon_slack_length=0.07155178 pennation_angle_at_optimal=0.08726646
      PathPoint P1: spine (-0.114208 0.614357 -0.0401403)
      PathPoint P2: skull (-0.0834714 0.0223633 -0.0111797)
      PathWrap: wrap_object=Extensor_c2_wrap_l method=midpoint
    Thelen2003Muscle semi_cerv_c3thx: max_isometric_force=121.695 optimal_fiber_length=0.07162291
        tendon_slack_length=0.02883243 pennation_angle_at_optimal=0.08726646
      PathPoint P1: spine (-0.118983 0.583824 0.0301573)
      PathPoint P2: cerv3 (-0.0405069 -0.00320945 0.00239214)
    Thelen2003Muscle semi_cerv_c3thx_l: max_isometric_force=121.695 optimal_fiber_length=0.07162291
        tendon_slack_length=0.02883243 pennation_angle_at_optimal=0.08726646
      PathPoint P1: spine (-0.118983 0.583824 -0.0301573)
      PathPoint P2: cerv3 (-0.0405069 -0.00320945 -0.00239214)
    Thelen2003Muscle levator_scap: max_isometric_force=144.97 optimal_fiber_length=0.1347141
        tendon_slack_length=0.02607849 pennation_angle_at_optimal=0
      PathPoint P1: rscapula (-0.0862259 -0.0320528 -0.072048)
      PathPoint P2: cerv2 (-0.0118212 0.00722626 0.0211405)
    Thelen2003Muscle levator_scap_l: max_isometric_force=144.97 optimal_fiber_length=0.1292166
        tendon_slack_length=0.02501428 pennation_angle_at_optimal=0
      PathPoint P1: lscapula (-0.0944506 -0.0351102 0.0789204)
      PathPoint P2: cerv2 (-0.0118212 0.00722626 -0.0211405)
    Thelen2003Muscle longissi_cap_sklc6: max_isometric_force=59.242 optimal_fiber_length=0.07242583
        tendon_slack_length=0.02413791 pennation_angle_at_optimal=0
      PathPoint P1: cerv6 (-0.00814324 0.0151004 0.0274996)
      PathPoint P2: skull (-0.0374321 0.00570265 0.0553948)
    Thelen2003Muscle longissi_cap_sklc6_l: max_isometric_force=59.242 optimal_fiber_length=0.07242583
        tendon_slack_length=0.02413791 pennation_angle_at_optimal=0
      PathPoint P1: cerv6 (-0.00814324 0.0151004 -0.0274996)
      PathPoint P2: skull (-0.0374321 0.00570265 -0.0553948)
    Thelen2003Muscle longissi_cerv_c4thx: max_isometric_force=38.095 optimal_fiber_length=0.1469169
        tendon_slack_length=0.04717931 pennation_angle_at_optimal=0
      PathPoint P1: spine (-0.147043 0.50109 0.0371905)
      PathPoint P2: spine (-0.146027 0.530696 0.0351777)
      PathPoint P3: spine (-0.133454 0.558092 0.0337664)
      PathPoint P4: spine (-0.108738 0.609534 0.0322742)
      PathPoint P5: cerv4 (-0.00706678 0.0115321 0.0260145)
    Thelen2003Muscle longissi_cerv_c4thx_l: max_isometric_force=38.095 optimal_fiber_length=0.1469169
        tendon_slack_length=0.04717931 pennation_angle_at_optimal=0
      PathPoint P1: spine (-0.147043 0.50109 -0.0371905)
      PathPoint P2: spine (-0.146027 0.530696 -0.0351777)
      PathPoint P3: spine (-0.133454 0.558092 -0.0337664)
      PathPoint P4: spine (-0.108738 0.609534 -0.0322742)
      PathPoint P5: cerv4 (-0.00706678 0.0115321 -0.0260145)
    Thelen2003Muscle iliocost_cerv_c5rib: max_isometric_force=38.095 optimal_fiber_length=0.09409079
        tendon_slack_length=0.02989923 pennation_angle_at_optimal=0
      PathPoint P1: spine (-0.138416 0.559264 0.0616564)
      PathPoint P2: spine (-0.112001 0.613307 0.0466761)
      PathPoint P3: cerv5 (-0.00936922 0.0125388 0.0259149)
    Thelen2003Muscle iliocost_cerv_c5rib_l: max_isometric_force=38.095 optimal_fiber_length=0.09409079
        tendon_slack_length=0.02989923 pennation_angle_at_optimal=0
      PathPoint P1: spine (-0.138416 0.559264 -0.0616564)
      PathPoint P2: spine (-0.112001 0.613307 -0.0466761)
      PathPoint P3: cerv5 (-0.00936922 0.0125388 -0.0259149)
    Thelen2003Muscle rectcap_post_maj: max_isometric_force=61.978 optimal_fiber_length=0.03883504
        tendon_slack_length=0.02396437 pennation_angle_at_optimal=0.08726646
      PathPoint P1: cerv2 (-0.0362509 -0.00644881 0.00239214)
      PathPoint P2: skull (-0.0657238 0.0100635 0.0231651)
    Thelen2003Muscle rectcap_post_maj_l: max_isometric_force=61.978 optimal_fiber_length=0.03883504
        tendon_slack_length=0.02396437 pennation_angle_at_optimal=0.08726646
      PathPoint P1: cerv2 (-0.0362509 -0.00644881 -0.00239214)
      PathPoint P2: skull (-0.0657238 0.0100635 -0.0231651)
    Thelen2003Muscle rectcap_post_min: max_isometric_force=34.048 optimal_fiber_length=0.0218335
        tendon_slack_length=0.01941688 pennation_angle_at_optimal=0.08726646
      PathPoint P1: cerv1 (6.97708e-5 0.000897053 0.00608002)
      PathPoint P2: skull (-0.0725791 0.0100635 0.0146041)
    Thelen2003Muscle rectcap_post_min_l: max_isometric_force=34.048 optimal_fiber_length=0.0218335
        tendon_slack_length=0.01941688 pennation_angle_at_optimal=0.08726646
      PathPoint P1: cerv1 (6.97708e-5 0.000897053 -0.00608002)
      PathPoint P2: skull (-0.0725791 0.0100635 -0.0146041)
    Thelen2003Muscle obl_cap_sup: max_isometric_force=69.3595 optimal_fiber_length=0.02736511
        tendon_slack_length=0.02234854 pennation_angle_at_optimal=0.1745329
      PathPoint P1: cerv1 (0.0349352 0.00383739 0.0418625)
      PathPoint P2: skull (-0.0517738 0.0104101 0.038454)
    Thelen2003Muscle obl_cap_sup_l: max_isometric_force=69.3595 optimal_fiber_length=0.02736511
        tendon_slack_length=0.02234854 pennation_angle_at_optimal=0.1745329
      PathPoint P1: cerv1 (0.0349352 0.00383739 -0.0418625)
      PathPoint P2: skull (-0.0517738 0.0104101 -0.038454)
    Thelen2003Muscle obl_cap_inf: max_isometric_force=86.051 optimal_fiber_length=0.03787555
        tendon_slack_length=0.01555589 pennation_angle_at_optimal=0
      PathPoint P1: cerv2 (-0.0362509 -0.00644881 0.00545209)
      PathPoint P2: cerv1 (0.0298619 0.00347857 0.0377858)
    Thelen2003Muscle obl_cap_inf_l: max_isometric_force=86.051 optimal_fiber_length=0.03787555
        tendon_slack_length=0.01555589 pennation_angle_at_optimal=0
      PathPoint P1: cerv2 (-0.0362509 -0.00644881 -0.00545209)
      PathPoint P2: cerv1 (0.0298619 0.00347857 -0.0377858)
    Thelen2003Muscle supmult-C4-5-C2: max_isometric_force=26.866 optimal_fiber_length=0.0239214
        tendon_slack_length=0.02142959 pennation_angle_at_optimal=0
      PathPoint P1: cerv2 (-0.0329019 -0.0113128 0.00487399)
      PathPoint P2: cerv5 (-0.0133661 0.0198747 0.0228948)
    Thelen2003Muscle supmult-C4-5-C2_l: max_isometric_force=26.866 optimal_fiber_length=0.0239214
        tendon_slack_length=0.02142959 pennation_angle_at_optimal=0
      PathPoint P1: cerv2 (-0.0329019 -0.0113128 -0.00487399)
      PathPoint P2: cerv5 (-0.0133661 0.0198747 -0.0228948)
    Thelen2003Muscle supmult-C5-6-C2: max_isometric_force=42.142 optimal_fiber_length=0.02441976
        tendon_slack_length=0.02850634 pennation_angle_at_optimal=0
      PathPoint P1: cerv2 (-0.0338388 -0.0104556 0.00469457)
      PathPoint P2: cerv6 (-0.0115122 0.0207119 0.0250377)
    Thelen2003Muscle supmult-C5-6-C2_l: max_isometric_force=42.142 optimal_fiber_length=0.02441976
        tendon_slack_length=0.02850634 pennation_angle_at_optimal=0
      PathPoint P1: cerv2 (-0.0338388 -0.0104556 -0.00469457)
      PathPoint P2: cerv6 (-0.0115122 0.0207119 -0.0250377)
    Thelen2003Muscle supmult-C6-7-C2: max_isometric_force=35.701 optimal_fiber_length=0.02721059
        tendon_slack_length=0.03209455 pennation_angle_at_optimal=0
      PathPoint P1: cerv2 (-0.0338687 -0.0104257 0.00468461)
      PathPoint P2: cerv7 (-0.0121301 0.0210409 0.0265926)
    Thelen2003Muscle supmult-C6-7-C2_l: max_isometric_force=35.701 optimal_fiber_length=0.02721059
        tendon_slack_length=0.03209455 pennation_angle_at_optimal=0
      PathPoint P1: cerv2 (-0.0338687 -0.0104257 -0.00468461)
      PathPoint P2: cerv7 (-0.0121301 0.0210409 -0.0265926)
    Thelen2003Muscle supmult-T1-C4: max_isometric_force=121.695 optimal_fiber_length=0.07377162
        tendon_slack_length=0.02969308 pennation_angle_at_optimal=0.08726646
      PathPoint P1: cerv4 (-0.0303104 0.000807347 0.0044753)
      PathPoint P2: spine (-0.111988 0.610148 0.0368435)
    Thelen2003Muscle supmult-T1-C4_l: max_isometric_force=121.695 optimal_fiber_length=0.07377162
        tendon_slack_length=0.02969308 pennation_angle_at_optimal=0.08726646
      PathPoint P1: cerv4 (-0.0303104 0.000807347 -0.0044753)
      PathPoint P2: spine (-0.111988 0.610148 -0.0368435)
    Thelen2003Muscle supmult-T1-C5: max_isometric_force=121.695 optimal_fiber_length=0.07265232
        tendon_slack_length=0.02924256 pennation_angle_at_optimal=0.08726646
      PathPoint P1: cerv5 (-0.0353738 0.00979781 0.0050534)
      PathPoint P2: spine (-0.110409 0.607725 0.0345299)
    Thelen2003Muscle supmult-T1-C5_l: max_isometric_force=121.695 optimal_fiber_length=0.07265232
        tendon_slack_length=0.02924256 pennation_angle_at_optimal=0.08726646
      PathPoint P1: cerv5 (-0.0353738 0.00979781 -0.0050534)
      PathPoint P2: spine (-0.110409 0.607725 -0.0345299)
    Thelen2003Muscle supmult-T2-C6: max_isometric_force=121.695 optimal_fiber_length=0.07532399
        tendon_slack_length=0.0303179 pennation_angle_at_optimal=0.08726646
      PathPoint P1: cerv6 (-0.0369187 0.0110935 0.00489392)
      PathPoint P2: spine (-0.118755 0.585309 0.0319734)
    Thelen2003Muscle supmult-T2-C6_l: max_isometric_force=121.695 optimal_fiber_length=0.07532399
        tendon_slack_length=0.0303179 pennation_angle_at_optimal=0.08726646
      PathPoint P1: cerv6 (-0.0369187 0.0110935 -0.00489392)
      PathPoint P2: spine (-0.118755 0.585309 -0.0319734)
    Thelen2003Muscle deepmult-C4-5-C2: max_isometric_force=13.585 optimal_fiber_length=0.02023352
        tendon_slack_length=0.01515022 pennation_angle_at_optimal=0
      PathPoint P1: cerv2 (-0.0208216 -0.00495372 0.00597038)
      PathPoint P2: cerv5 (-0.0131269 0.0201837 0.0208914)
    Thelen2003Muscle deepmult-C4-5-C2_l: max_isometric_force=13.585 optimal_fiber_length=0.02023352
        tendon_slack_length=0.01515022 pennation_angle_at_optimal=0
      PathPoint P1: cerv2 (-0.0208216 -0.00495372 -0.00597038)
      PathPoint P2: cerv5 (-0.0131269 0.0201837 -0.0208914)
    Thelen2003Muscle deepmult-C5-6-C3: max_isometric_force=23.826 optimal_fiber_length=0.01843941
        tendon_slack_length=0.01694433 pennation_angle_at_optimal=0
      PathPoint P1: cerv3 (-0.02129 -0.00322939 0.00608999)
      PathPoint P2: cerv6 (-0.011552 0.0209611 0.0235227)
    Thelen2003Muscle deepmult-C5-6-C3_l: max_isometric_force=23.826 optimal_fiber_length=0.01843941
        tendon_slack_length=0.01694433 pennation_angle_at_optimal=0
      PathPoint P1: cerv3 (-0.02129 -0.00322939 -0.00608999)
      PathPoint P2: cerv6 (-0.011552 0.0209611 -0.0235227)
    Thelen2003Muscle deepmult-C6-7-C4: max_isometric_force=34.789 optimal_fiber_length=0.01694433
        tendon_slack_length=0.01734302 pennation_angle_at_optimal=0
      PathPoint P1: cerv4 (-0.0215392 -0.000159476 0.00647871)
      PathPoint P2: cerv7 (-0.0127381 0.0209611 0.0249979)
    Thelen2003Muscle deepmult-C6-7-C4_l: max_isometric_force=34.789 optimal_fiber_length=0.01694433
        tendon_slack_length=0.01734302 pennation_angle_at_optimal=0
      PathPoint P1: cerv4 (-0.0215392 -0.000159476 -0.00647871)
      PathPoint P2: cerv7 (-0.0127381 0.0209611 -0.0249979)
    Thelen2003Muscle deepmult-T1-C5: max_isometric_force=121.695 optimal_fiber_length=0.07576577
        tendon_slack_length=0.03049572 pennation_angle_at_optimal=0.08726646
      PathPoint P1: cerv5 (-0.0277189 0.0100869 0.00576107)
      PathPoint P2: spine (-0.111065 0.610751 0.035652)
    Thelen2003Muscle deepmult-T1-C5_l: max_isometric_force=121.695 optimal_fiber_length=0.07576577
        tendon_slack_length=0.03049572 pennation_angle_at_optimal=0.08726646
      PathPoint P1: cerv5 (-0.0277189 0.0100869 -0.00576107)
      PathPoint P2: spine (-0.111065 0.610751 -0.035652)
    Thelen2003Muscle deepmult-T1-C6: max_isometric_force=121.695 optimal_fiber_length=0.07963446
        tendon_slack_length=0.03205287 pennation_angle_at_optimal=0.08726646
      PathPoint P1: cerv6 (-0.0274697 0.0107746 0.00577104)
      PathPoint P2: spine (-0.109687 0.607178 0.0335235)
    Thelen2003Muscle deepmult-T1-C6_l: max_isometric_force=121.695 optimal_fiber_length=0.07963446
        tendon_slack_length=0.03205287 pennation_angle_at_optimal=0.08726646
      PathPoint P1: cerv6 (-0.0274697 0.0107746 -0.00577104)
      PathPoint P2: spine (-0.109687 0.607178 -0.0335235)
    Thelen2003Muscle deepmult-T2-C7: max_isometric_force=121.695 optimal_fiber_length=0.08372559
        tendon_slack_length=0.03369955 pennation_angle_at_optimal=0.08726646
      PathPoint P1: cerv7 (-0.0268817 0.0121999 0.00577104)
      PathPoint P2: spine (-0.118836 0.585063 0.0320544)
    Thelen2003Muscle deepmult-T2-C7_l: max_isometric_force=121.695 optimal_fiber_length=0.08372559
        tendon_slack_length=0.03369955 pennation_angle_at_optimal=0.08726646
      PathPoint P1: cerv7 (-0.0268817 0.0121999 -0.00577104)
      PathPoint P2: spine (-0.118836 0.585063 -0.0320544)
    Millard2012EquilibriumMuscle [values shared by the 20 below unless stated]: minimum_activation=0.01
        pennation_angle_at_optimal=0 [radians]
      ActiveForceLengthCurve: min_norm_active_fiber_length=0.4441 transition_norm_fiber_length=0.73
          max_norm_active_fiber_length=1.8123 shallow_ascending_slope=0.8616 minimum_value=0
      ForceVelocityCurve: concentric_slope_at_vmax=0 concentric_slope_near_vmax=0.25 isometric_slope=5
          eccentric_slope_at_vmax=0 eccentric_slope_near_vmax=0.15 max_eccentric_velocity_force_multiplier=1.4
          concentric_curviness=0.6 eccentric_curviness=0.9
      FiberForceLengthCurve
      TendonForceLengthCurve
    Millard2012EquilibriumMuscle digastric_post: max_isometric_force=109.62 optimal_fiber_length=0.02071321
        tendon_slack_length=0.03448901 pennation_angle_at_optimal=0.2496
      PathPoint digastricpost-P1: skull (-0.00663767 0.00380177 0.0480424)
      PathPoint digastricpost-P2: cerv3 (0.023134 0.00595045 0.028606)
    Millard2012EquilibriumMuscle digastric_ant: max_isometric_force=109.62 optimal_fiber_length=0.01224425
        tendon_slack_length=0.004311356
      PathPoint digastricpost-P1: skull (0.0329707 -0.0718981 0.0174242)
      PathPoint digastricpost-P2: cerv1 (0.0726513 -0.0573914 0.00568133)
    Millard2012EquilibriumMuscle geniohyoid: max_isometric_force=91.665 optimal_fiber_length=0.03985404
        tendon_slack_length=0.006297636
      PathPoint digastricpost-P1: cerv1 (0.0714949 -0.0536144 0.00507775)
      PathPoint digastricpost-P2: skull (0.0751906 -0.0752526 0.00161148)
    Millard2012EquilibriumMuscle mylohyoid_post: max_isometric_force=50.085 optimal_fiber_length=0.02666358
        tendon_slack_length=0.0132499
      PathPoint digastricpost-P1: cerv1 (0.0750036 -0.055697 0.00308985)
      PathPoint digastricpost-P2: skull (0.0449403 -0.0434967 0.0293089)
    Millard2012EquilibriumMuscle mylohyoid_ant: max_isometric_force=150.255 optimal_fiber_length=0.01905618
        tendon_slack_length=0.002610696 default_fiber_length=0.1
      PathPoint digastricpost-P1: cerv1 (0.0969315 -0.0564944 -0.00308985)
      PathPoint digastricpost-P2: skull (0.0630034 -0.0666427 0.0159134)
    Millard2012EquilibriumMuscle stylohyoid_lat: max_isometric_force=18.41786 optimal_fiber_length=0.01811348
        tendon_slack_length=0.04931445 pennation_angle_at_optimal=0.082
      PathPoint digastricpost-P1: skull (0.012296 -0.000894533 0.0378699)
      PathPoint digastricpost-P2: cerv1 (0.0641274 -0.0495205 0.0153894)
    Millard2012EquilibriumMuscle stylohyoid_med: max_isometric_force=18.41786 optimal_fiber_length=0.0180758
        tendon_slack_length=0.04332682 pennation_angle_at_optimal=0.08203
      PathPoint digastricpost-P1: skull (0.0128401 -0.00223633 0.0378699)
      PathPoint digastricpost-P2: cerv1 (0.0630589 -0.0449063 0.0161989)
    Millard2012EquilibriumMuscle sterno_hyoid: max_isometric_force=54.81 optimal_fiber_length=0.07630549
        tendon_slack_length=0.03270235
      PathPoint stern_mast-P1: cerv3 (0.057232 -0.0230642 0.0062694)
      PathPoint default: torso (-0.0187689 0.348886 0.0229505)
    Millard2012EquilibriumMuscle sternothyroid: max_isometric_force=61.425 optimal_fiber_length=0.06564793
        tendon_slack_length=0.02813483
      PathPoint stern_mast-P1: cerv3 (0.0402877 -0.0430187 0.0132564)
      PathPoint default: torso (-0.0195848 0.341328 0.0176988)
    Millard2012EquilibriumMuscle omo_hyoid: max_isometric_force=70.875 optimal_fiber_length=0.0441079
        tendon_slack_length=0.01890339
      PathPoint stern_mast-P1: cerv3 (0.0519493 -0.0138545 0.0131568)
      PathPoint default: torso (-0.0281313 0.413981 0.0436569)
    Millard2012EquilibriumMuscle digastric_post_l: max_isometric_force=109.62 optimal_fiber_length=0.02071321
        tendon_slack_length=0.03448901 pennation_angle_at_optimal=0.2496
      PathPoint digastricpost-P1: skull (-0.00663767 0.00380177 -0.0480424)
      PathPoint digastricpost-P2: cerv3 (0.023134 0.00595045 -0.028606)
    Millard2012EquilibriumMuscle digastric_ant_l: max_isometric_force=109.62 optimal_fiber_length=0.01224425
        tendon_slack_length=0.004311356
      PathPoint digastricpost-P1: skull (0.0329707 -0.0718981 -0.0174242)
      PathPoint digastricpost-P2: cerv1 (0.0726513 -0.0573914 -0.00568133)
    Millard2012EquilibriumMuscle geniohyoid_l: max_isometric_force=91.665 optimal_fiber_length=0.03978547
        tendon_slack_length=0.0062868
      PathPoint digastricpost-P1: cerv1 (0.0712606 -0.0536397 -0.00628248)
      PathPoint digastricpost-P2: skull (0.0751906 -0.0752526 -0.00161148)
    Millard2012EquilibriumMuscle mylohyoid_post_l: max_isometric_force=50.085 optimal_fiber_length=0.02666358
        tendon_slack_length=0.0132499
      PathPoint digastricpost-P1: cerv1 (0.0750036 -0.055697 -0.00308985)
      PathPoint digastricpost-P2: skull (0.0449403 -0.0434967 -0.0293089)
    Millard2012EquilibriumMuscle mylohyoid_ant_l: max_isometric_force=150.255 optimal_fiber_length=0.01905618
        tendon_slack_length=0.002610696
      PathPoint digastricpost-P1: cerv1 (0.0969315 -0.0564944 0.00308985)
      PathPoint digastricpost-P2: skull (0.0630034 -0.0666427 -0.0159134)
    Millard2012EquilibriumMuscle stylohyoid_lat_l: max_isometric_force=18.41786 optimal_fiber_length=0.01811446
        tendon_slack_length=0.04931712 pennation_angle_at_optimal=0.082
      PathPoint digastricpost-P1: skull (0.012296 -0.000894533 -0.0378699)
      PathPoint digastricpost-P2: cerv1 (0.0634736 -0.0495907 -0.0162995)
    Millard2012EquilibriumMuscle stylohyoid_med_l: max_isometric_force=18.41786 optimal_fiber_length=0.01807693
        tendon_slack_length=0.04332951 pennation_angle_at_optimal=0.08203
      PathPoint digastricpost-P1: skull (0.0128401 -0.00223633 -0.0378699)
      PathPoint digastricpost-P2: cerv1 (0.0623723 -0.0449799 -0.0170847)
    Millard2012EquilibriumMuscle sterno_hyoid_l: max_isometric_force=54.81 optimal_fiber_length=0.07630549
        tendon_slack_length=0.03270235
      PathPoint stern_mast-P1: cerv3 (0.057232 -0.0230642 -0.0062694)
      PathPoint default: torso (-0.0187689 0.348886 -0.0229505)
    Millard2012EquilibriumMuscle sternothyroid_l: max_isometric_force=61.425 optimal_fiber_length=0.06564793
        tendon_slack_length=0.02813483
      PathPoint stern_mast-P1: cerv3 (0.0402877 -0.0430187 -0.0132564)
      PathPoint default: torso (-0.0195848 0.341328 -0.0176988)
    Millard2012EquilibriumMuscle omo_hyoid_l: max_isometric_force=70.875 optimal_fiber_length=0.0441079
        tendon_slack_length=0.01890339
      PathPoint stern_mast-P1: cerv3 (0.0519493 -0.0138545 -0.0131568)
      PathPoint default: torso (-0.0281313 0.413981 -0.0436569)
    SmoothSphereHalfSpaceForce [values shared by the 10 below unless stated]: socket_half_space=/contactgeometryset/floor
        stiffness=10000000 [N/m^2] dissipation=2 [s/m] static_friction=0.8 dynamic_friction=0.8 viscous_friction=0.5
        transition_velocity=0.2 [m/s]
    SmoothSphereHalfSpaceForce SmoothSphereHalfSpaceForce_heel_r: socket_sphere=/contactgeometryset/heel_r
    SmoothSphereHalfSpaceForce SmoothSphereHalfSpaceForce_hindfoot_lat_r: socket_sphere=/contactgeometryset/hindfoot_lat_r
    SmoothSphereHalfSpaceForce SmoothSphereHalfSpaceForce_forefoot_lat_r: socket_sphere=/contactgeometryset/forefoot_lat_r
    SmoothSphereHalfSpaceForce SmoothSphereHalfSpaceForce_forefoot_med_r: socket_sphere=/contactgeometryset/forefoot_med_r
    SmoothSphereHalfSpaceForce SmoothSphereHalfSpaceForce_hallux_r: socket_sphere=/contactgeometryset/hallux_r
    SmoothSphereHalfSpaceForce SmoothSphereHalfSpaceForce_heel_l: socket_sphere=/contactgeometryset/heel_l
    SmoothSphereHalfSpaceForce SmoothSphereHalfSpaceForce_hindfoot_lat_l: socket_sphere=/contactgeometryset/hindfoot_lat_l
    SmoothSphereHalfSpaceForce SmoothSphereHalfSpaceForce_forefoot_lat_l: socket_sphere=/contactgeometryset/forefoot_lat_l
    SmoothSphereHalfSpaceForce SmoothSphereHalfSpaceForce_forefoot_med_l: socket_sphere=/contactgeometryset/forefoot_med_l
    SmoothSphereHalfSpaceForce SmoothSphereHalfSpaceForce_hallux_l: socket_sphere=/contactgeometryset/hallux_l
    BushingForce [values shared by the 8 below unless stated]: rotational_stiffness=(18.91 18.58 24.06) [Nm/rad]
        translational_stiffness=(75900 23100000 73000) [N/m] rotational_damping=(1.5 1.5 1.5) [Nm/(rad/s)]
        translational_damping=(1400 4300 1000) [N/(m/s)]
    BushingForce auxt1jnt_bushing: socket_frame1=spine_offset socket_frame2=cerv7_offset
      PhysicalOffsetFrame spine_offset: socket_parent=/bodyset/spine translation=(-0.0635305 0.596472 0)
      PhysicalOffsetFrame cerv7_offset: socket_parent=/bodyset/cerv7 translation=(0.0068176 -0.00563648 0)
    BushingForce aux7jnt_bushing: socket_frame1=cerv7_offset socket_frame2=cerv6_offset
      PhysicalOffsetFrame cerv7_offset: socket_parent=/bodyset/cerv7 translation=(0.0132126 0.0123395 0)
      PhysicalOffsetFrame cerv6_offset: socket_parent=/bodyset/cerv6 translation=(0.00938815 -0.00405169 0)
    BushingForce aux6jnt_bushing: socket_frame1=cerv6_offset socket_frame2=cerv5_offset
      PhysicalOffsetFrame cerv6_offset: socket_parent=/bodyset/cerv6 translation=(0.00981774 0.00971807 0)
      PhysicalOffsetFrame cerv5_offset: socket_parent=/bodyset/cerv5 translation=(0.00565143 -0.00812331 0)
    BushingForce aux5jnt_bushing: socket_frame1=cerv5_offset socket_frame2=cerv4_offset
      PhysicalOffsetFrame cerv5_offset: socket_parent=/bodyset/cerv5 translation=(0.00840239 0.0074256 0)
      PhysicalOffsetFrame cerv4_offset: socket_parent=/bodyset/cerv4 translation=(0.00500356 -0.0116816 0)
    BushingForce aux4jnt_bushing: socket_frame1=cerv4_offset socket_frame2=cerv3_offset
      PhysicalOffsetFrame cerv4_offset: socket_parent=/bodyset/cerv4 translation=(0.00729603 0.00635911 0)
      PhysicalOffsetFrame cerv3_offset: socket_parent=/bodyset/cerv3 translation=(0.00469457 -0.00899046 0)
    BushingForce aux3jnt_bushing: socket_frame1=cerv3_offset socket_frame2=cerv2_offset
      PhysicalOffsetFrame cerv3_offset: socket_parent=/bodyset/cerv3 translation=(0.00523281 0.00504343 0)
      PhysicalOffsetFrame cerv2_offset: socket_parent=/bodyset/cerv2 translation=(0.00541222 -0.0111932 0)
    BushingForce aux2jnt_bushing: socket_frame1=cerv2_offset socket_frame2=cerv1_offset translational_stiffness=(0 0 0)
        translational_damping=(0 0 0)
      PhysicalOffsetFrame cerv2_offset: socket_parent=/bodyset/cerv2 translation=(0.00686744 0.0212103 0)
      PhysicalOffsetFrame cerv1_offset: socket_parent=/bodyset/cerv1 translation=(0.042311 0.00350847 0)
    BushingForce aux1jnt_bushing: socket_frame1=cerv1_offset socket_frame2=/bodyset/skull
        translational_stiffness=(0 0 0) translational_damping=(0 0 0)
      PhysicalOffsetFrame cerv1_offset: socket_parent=/bodyset/cerv1 translation=(0.043208 0.0148711 0)
  MarkerSet:
    Marker HD_1: skull (0.114562 0.09 -0.00130949) fixed=true
    Marker HD_2: skull (-0.04 0.2 0.00248642) fixed=true
    Marker HD_3: skull (-0.107627 0.03300206 0.000991151) fixed=true
    Marker C7: cerv7 (-0.06607599 0.01859332 0.000661881) fixed=true
    Marker T8: spine (-0.1800763 0.2744339 0.001015735) fixed=true
    Marker L4: spine (-0.1435296 0.08665885 -0.0001539432) fixed=true
    Marker SC_L: lclavicle (0.047117 0.00926463 -0.0118138) fixed=true
    Marker AC_L: lclavicle (-0.08292023 0.04922006 -0.1240811) fixed=true
    Marker H1_L: humerus_l (-0.0774018 -0.14449 0.00245595)
    Marker H2_L: humerus_l (-0.0562163 -0.247722 -0.00449757)
    Marker H3_L: humerus_l (0.00402896 -0.233236 -0.0403825)
    Marker SC_R: rclavicle (0.047117 0.00926463 0.0118138) fixed=true
    Marker AC_R: rclavicle (-0.08767591 0.0484783 0.113927) fixed=true
    Marker H1_R: humerus_r (-0.0765566 -0.135473 -0.00411916)
    Marker H2_R: humerus_r (-0.060416 -0.238839 0.00510876)
    Marker H3_R: humerus_r (-0.00395096 -0.227413 0.0446214)
    Marker PSIS_L: pelvis (-0.199431 0.0513044 -0.0631052) fixed=true
    Marker PSIS_R: pelvis (-0.1994312 0.05130435 0.06310517) fixed=true
    Marker IC_L: pelvis (-0.110214 0.09580121 -0.204888) fixed=true
    Marker IC_R: pelvis (-0.110214 0.0958012 0.204888) fixed=true
    Marker H4_R: humerus_r (-0.0209626 -0.124678 0.0373523)
    Marker H4_L: humerus_l (-0.0186098 -0.130404 -0.0342099)
    Marker XI: torso (0.1661047 0.18 9.29729e-5) fixed=true
    Marker ASIS_L: pelvis (0.009539552 0.02294506 -0.1534914) fixed=true
    Marker ASIS_R: pelvis (0.00953955 0.0229451 0.153491) fixed=true
    Marker ELM_R: humerus_r (-0.009541012 -0.3011357 -0.04434559) fixed=true
    Marker EL_R: humerus_r (0.00415649 -0.304944 0.041233) fixed=true
    Marker EL_L: humerus_l (0.00420265 -0.314249 -0.0476874) fixed=true
    Marker ELM_L: humerus_l (0.004051278 -0.3088177 0.04325668) fixed=true
    Marker WRL_L: ulna_l (0.007896185 -0.2350397 -0.06615338) fixed=true
    Marker WRM_L: ulna_l (-0.03651438 -0.229388 -0.007006607) fixed=true
    Marker WRM_R: ulna_r (-0.03399181 -0.2339989 0.001405439) fixed=true
    Marker WRL_R: ulna_r (0.00789618 -0.23504 0.0661534) fixed=true
    Marker RFA1: ulna_r (-0.0583529 -0.09743259 0.01929726)
    Marker RFA4: ulna_r (-0.02497436 -0.09882496 0.0637965)
    Marker RFA2: ulna_r (-0.04924415 -0.1650706 0.01614607)
    Marker RFA3: ulna_r (-0.01834927 -0.1609676 0.06093906)
    Marker LFA4: ulna_l (-0.001861957 -0.08423924 -0.0656949)
    Marker LFA1: ulna_l (-0.04246768 -0.08934758 -0.03103208)
    Marker LFA2: ulna_l (-0.03411059 -0.1547713 -0.02626992)
    Marker LFA3: ulna_l (-0.001022967 -0.1481889 -0.06166605)
    Marker RBACK: torso (-0.156586 0.315478 0.0480809)
    Marker LUBACK: torso (-0.1565862 0.3154775 -0.0480809)
    Marker FH1: skull (0.0419436 0.121094 -0.0835264)
    Marker FH2: skull (0.0419436 0.1210944 0.08352637)
    Marker BH1: skull (-0.06708046 0.1003149 -0.07323558)
    Marker BH2: skull (-0.0670805 0.100315 0.0732356)
    Marker LBACK: torso (-0.18 0.086784 -0.122812)
    Marker RDBACK: torso (-0.18 0.086784 0.122812)
    Marker HAN_R: hand_r (-0.02901213 -0.07099905 -0.004341513) fixed=true
    Marker HAN_L: hand_l (-0.02795781 -0.07258232 0.003513346) fixed=true
    Marker SHO_L: humerus_l (0.01501656 0.005542886 -0.04099816) fixed=true
    Marker SHO_R: humerus_r (0.003726417 0.000153732 0.04802459) fixed=true
    Marker GT_R: femur_r (-0.0108973 -0.0239208 0.0894925) fixed=true
    Marker LC_R: femur_r (0.00451664 -0.446812 0.0691833) fixed=true
    Marker MC_R: femur_r (0.00169679 -0.4643839 -0.05170616) fixed=true
    Marker TH1_R: femur_r (0.00471578 -0.239467 0.121014)
    Marker TH2_R: femur_r (0.070957 -0.250223 0.113296)
    Marker TH3_R: femur_r (0.0538843 -0.360822 0.100266)
    Marker TH4_R: femur_r (-0.0121614 -0.35138 0.10051)
    Marker SK2_R: tibia_r (0.0148559 -0.13622 0.0882419)
    Marker SK1_R: tibia_r (-0.0555414 -0.135561 0.0884547)
    Marker SK3_R: tibia_r (0.0200722 -0.260254 0.0887866)
    Marker SK4_R: tibia_r (-0.049752 -0.256207 0.0897632)
    Marker LM_R: calcn_r (0.0438642 0.0530505 0.0472605) fixed=true
    Marker MM_R: calcn_r (0.0611693 0.0614886 -0.0471759) fixed=true
    Marker HL_R: calcn_r (-0.01945294 0.01031518 -0.006777) fixed=true
    Marker 1M_R: calcn_r (0.201426 0.0127389 -0.0538672) fixed=true
    Marker 5M_R: calcn_r (0.162201 0.005733793 0.0562205) fixed=true
    Marker GT_L: femur_l (-0.01274532 -0.02392083 -0.0894925) fixed=true
    Marker LC_L: femur_l (-0.002392374 -0.4414407 -0.0640847) fixed=true
    Marker MC_L: femur_l (0.005358927 -0.4646563 0.05172673) fixed=true
    Marker TH1_L: femur_l (-0.00365852 -0.231608 -0.103912)
    Marker TH2_L: femur_l (0.0566201 -0.237837 -0.0958748)
    Marker TH3_L: femur_l (0.0498125 -0.349722 -0.0852784)
    Marker TH4_L: femur_l (-0.00691209 -0.342723 -0.0926286)
    Marker SK1_L: tibia_l (-0.0442096 -0.142275 -0.103355)
    Marker SK2_L: tibia_l (0.0271056 -0.142138 -0.0855558)
    Marker SK4_L: tibia_l (-0.0416422 -0.253149 -0.103164)
    Marker SK3_L: tibia_l (0.0292954 -0.256217 -0.0877226)
    Marker LM_L: calcn_l (0.0425093 0.0524139 -0.0477769) fixed=true
    Marker MM_L: calcn_l (0.0536359 0.0720281 0.0421875) fixed=true
    Marker HL_L: calcn_l (-0.0194529 0.0103152 0.006777) fixed=true
    Marker 1M_L: calcn_l (0.196099 0.012402 0.0517157) fixed=true
    Marker 5M_L: calcn_l (0.152201 0.00573379 -0.0562205) fixed=true
    Marker Pbd4: punching_bag (-0.101411 -0.558924 -0.158144) fixed=true
    Marker Pbd3: punching_bag (0.114383 -0.58056 -0.128452) fixed=true
    Marker Pbd1: punching_bag (0.100594 -0.560908 0.139013) fixed=true
    Marker Pbd2: punching_bag (-0.1332055 -0.544574 0.141889) fixed=true
    Marker Pbu1: punching_bag (0.131213 0.571962 0.140676) fixed=true
    Marker Pbu2: punching_bag (-0.107626 0.599346 0.130741) fixed=true
    Marker Pbu3: punching_bag (-0.112825 0.592652 -0.139592) fixed=true
    Marker Pbu4: punching_bag (0.111977 0.568388 -0.126369) fixed=true
    Marker cylinder_top: punching_bag (0 0.5386 0)
    Marker cylinder_bottom: punching_bag (0 -0.5386 0)
  ContactGeometrySet:
    ContactHalfSpace floor: socket_frame=/ground location=(0 0 0) orientation=(0 0 -1.570796)
    ContactSphere heel_r: socket_frame=/bodyset/calcn_r location=(0.01 0.006922918 -0.0049972) radius=0.032
    ContactSphere hindfoot_lat_r: socket_frame=/bodyset/calcn_r location=(0.06 0.01192292 0.020001) radius=0.032
    ContactSphere forefoot_lat_r: socket_frame=/bodyset/calcn_r location=(0.1642 0.002 0.0203) radius=0.023
    ContactSphere forefoot_med_r: socket_frame=/bodyset/calcn_r location=(0.1642 0.002 -0.0108) radius=0.021
    ContactSphere hallux_r: socket_frame=/bodyset/toes_r location=(0.053154 -0.001538541 -0.0034173) radius=0.016
    ContactSphere heel_l: socket_frame=/bodyset/calcn_l location=(0.01 0.006922918 0.0049972) radius=0.032
    ContactSphere hindfoot_lat_l: socket_frame=/bodyset/calcn_l location=(0.06 0.01192292 -0.020001) radius=0.032
    ContactSphere forefoot_lat_l: socket_frame=/bodyset/calcn_l location=(0.1642 0.002 -0.0203) radius=0.023
    ContactSphere forefoot_med_l: socket_frame=/bodyset/calcn_l location=(0.1642 0.002 0.0108) radius=0.021
    ContactSphere hallux_l: socket_frame=/bodyset/toes_l location=(0.053154 -0.001538541 0.0034173) radius=0.016
